# OpenSim document version 30000
Model Patient4_optModel:
  length_units: meters
  force_units: N
  gravity: 0 -9.80665 0
  credits:
    Arnold, E.M., Hamner, S.R., Ward, S.R., Lieber, R. L., and Delp, S.L.
  publications:
    Arnold, E.M., Ward, S.R., Lieber, R. L., and Delp, S.L., A model of the lower limb for analysis of human movement, Annals of Biomedical Engineering, 2009, DOI: 10.1007/s10439-009-9852-5 Hamner, SR, Seth, A, and Delp, SL, Muscle contributions to propulsion and support during running. Journal of Biomechanics, doi:10.1016/j.jbiomech.2010.06.025 (2010) DETAILED COMMENTS AND REFERENCES FOR USE WITH THE 14 SEGMENT KINEMATIC MUSCULOSKELETAL MODEL CREATED BY EDITH M. ARNOLD: Arnoldetal2010_2Legs_Default.osim This file contains three options for muscle models: Thelen2003Muscle Schutte1993Muscle Delp1990Muscle This musculoskeletal model was Uses the Schutte1993Model because it is similar to the Delp1990Muscle, but should be more stable during ComputedMuscleControl. Exceptions: Back muscles were adapted from the OpenSim default model gait_2392 and remain as Thelen2003Muscle format. The definition of each muscle contains a list of coordinates that describe its line of action and the parameters (peak isometric force, optimal fiber length, tendon slack length, and pennation angle) needed to compute isometric muscle force. Additional parameters can be added to create a dynamics-based muscle model. The joint definitions describe the kinematics of a 14 segment, 7 degree-of-freedom model of the pelvis, torso, and left and right femur, patella, tibia, calcaneus, talus, and toes. The model represents a nominal adult male, and is based on the lower limb models developed by Delp et al. (1990) and A.S. Arnold (1999). It includes the following modifications, relative to the Delp et al. model: 1. Expanded architecture data This architecture of these muscles is based on a study of 21 cadavers by Ward et al. (2009), an improvement over the data by Wickiewicz (1983) Friederich and Brand (1990)which included only 5 total. 2. Fiber length-joint angle relationship Ward et al. explicitly linked measured fiber lengths to joint angles. This allows examination of the fiber length operating range in relation to joint angle. 3. Experimentally based tendon lengths In the Delp model tendon lengths were set so that resultant passive moments matched experimental results. In this model they were set using an experimentally measured relationship between fiber length and joint angle. There are two options for semimembranosus tendon length: 0.348 is representative of the experimental joint angle-fiber length relationship, but results in unrealistic passive forces at high hip flexion. This value is the default as it is most true to the architecture data. 0.378 is gives more realistic passive behavior in high hip flexion angles, but fibers become very short in less extreme configurations(like walking). This is value included in the paper of reference. Comment out the one you don't want to use. 4. Longer plantarflexor fibers In the Delp model the fiber lengths of soleus and the gastrocnemii were lengthened beyond the data reported by Wickiewicz et al. This was necessary to achieve physiolgically reasonable results. The plantarflexor fiber lengths measured by Ward et al. were longer and thus lengthening was not necessary. 5. Walker knee In this model, 3D tibiofemoral kinematics are based on experimental data published by Walker et al. (1988) and adapted from a SIMM model by A.S. Arnold et al. (2000) Knee flexion is positive and full extension is 0 degrees. Walker, P. S., J. S. Rovick, and D. D. Robertson. The effects of knee brace hinge design and placement on joint mechanics. J. Biomech. 21:965-974, 1988. 6. Altered wrapping and attachment points Wrapping surfaces were added and some attachment points were modified to refine muscle paths and moment arms. Additions are a combination of surfaces adapted from A.S. Arnold et al. (2000) and new surfaces. 7. Right and left hemipelves and sacrum were re-oriented. Adapted from A.S. Arnold et al. (2000) In this model, spatial relationships between the hemipelves and sacrum are more consistent with pelves constructed from MR images. 8. Femur was re-digitized. Adapted from A.S. Arnold et al. (2000) The femur from Delp's model (Specimen A55, Stanford University) was digitized at higher resolution. 9. Tibia was replaced. Adapted from A.S. Arnold et al. (2000) The tibia in Delp's model did not match the Specimen A55 femur. The tibia from Specimen A55 was digitized and used in place of the tibia in Delp's model. 10. Fibula was scaled by 97% and re-oriented. Adapted from A.S. Arnold et al. (2000) 11. Pelvis coordinate system was revised. Adapted from A.S. Arnold et al. (2000) In this model, the "neutral position" was defined such that the ASISs and pubic tubercle lie in the frontal plane. In Delp's model, the "neutral position" was defined to be coincident with the anatomical position. This difference corresponds to an offset in pelvic tilt and hip flexion angle of about 5 degrees. This may also differ from a gait lab convention and care should be taken to ensure appropriate interpretations according to the convention used. JOURNAL ARTICLE REFERENCES The model of the lower limb is defined as an input file for OpenSim. An overview of this software and its input file structure is given in: Delp SL, Anderson FC, Arnold AS, Loan P, Habib A, John CT, Guendelman E, Thelen DG. OpenSim: Open-source Software to Create and Analyze Dynamic Simulations of Movement. IEEE Transactions on Biomedical Engineering 54(11):1940-50, 2007. The details of the lower limb model are described in the follow publications: Arnold, E.M., Ward, S.R., Lieber, R. L., and Delp, S.L., A model of the lower limb for analysis of human movement, Annals of Biomedical Engineering, 2009, DOI: 10.1007/s10439-009-9852-5 Arnold, A.S., Asakawa, D.J., and Delp, S.L., Do the hamstrings and adductors contribute to excessive internal rotation of the hip in persons with cerebral palsy? Gait Posture 11:181-90, 2000. Delp, S.L., Loan, J.P., Hoy, M.G., Zajac, F.E., Topp E.L., Rosen, J.M., An interactive graphics-based model of the lower extremity to study orthopaedic surgical procedures, IEEE Transactions on Biomedical Engineering, vol. 37, pp. 757-767, 1990. Delp, Surgery Simulation: A computer graphics system to analyze and design musculoskeletal reconstructions of the lower extremity, Ph.D. Dissertation, Stanford University, 1990. Ward, S. R., Eng, C.M., Smallwood, L.H., Lieber, R.L.: Are Current Measurements of Lower Extremity Muscle Architecture Accurate? Clin Orthop Relat Res 467:1074-82, 2009. Additional information on the model of the lower limb can be obtained by contacting Scott L. Delp. Bioengineering Department, Stanford University, Clark Center, Room S321 Stanford, California 94305 http://www.stanford.edu/group/nmbl/ Additional information on the musculoskeletal modeling software (OpenSim) can be obtained from simtk.org at https://simtk.org/home/opensim The muscle model used with the lower limb model is described in the following publications: Zajac, Muscle and tendon: Properties, models, scaling, and application to biomechanics and motor control, in CRC reviews in biomedical engineering vol.17, issue 4, pp. 359-411, 1989. Delp, S.L. and Loan, J.P.: A software system to develop and analyze models of musculoskeletal structures, Computers in Biology and Medicine, vol. 25, pp. 21-34, 1995. Buchanan and Lloyd Passive Curve Schutte LM Passive Curve REFERENCES FOR THE MUSCLE-TENDON PARAMETERS References are given for each musculotendon parameter in Table 1 of Arnold, E.M., Ward, S.R., Lieber, R. L., and Delp, S.L., A model of the lower limb for analysis of human movement, Annals of Biomedical Engineering, 2009, DOI: 10.1007/s10439-009-9852-5 LOCATION OF REFERENCE FRAMES Each musculotendon path is defined as series of three-dimensional coordinates. Each coordinate is fixed in a body-segmental reference frame. In the anatomical position, the X-axes point anteriorly, the Y-axes point superiorly, and the Z-axes point laterally. The location of these frames is as follows. PELVIS: The pelvic reference frame is fixed at the midpoint of the line connecting the two ASIS. FEMUR: The femoral frame is fixed at the center of the femoral head TIBIA: The tibial segment is located at the midpoint of the line between the medial and lateral femoral epicondyles. PATELLA: The patellar frame is located at the most distal point of the patella. TALUS: The talar frame is located at the midpoint of the line between the apeces of the medial and lateral maleoli. CALCANUS: The calcaneal frame is located at the most distal, inferior point on the posterior surface of the calcaneus. TOES: The toe frame is located at the base of the second metatarsal Walker et al. used a different convention for the femur and tibia frame when describing the knee joint. In the anatomical position the X-axis points medially (left), Y-axis points superiorly, Z-axis points anteriorly. These frames are translated to the FEMUR and TIBIA frame via fixed joints. FEMUR_WLKR: Located at the midpoint of the line between the medial and lateral femoral epicondyles. TIBIA_WLKR: Coincident with FEMUR_WLKR at knee_angle = 0 SHAFT_AXIS: A fixed reference frame oriented along the line of the femur shaft used to simplify the placement of wrapping surfaces during model development.
  BodySet:
    Body ground: mass=0 mass_center=(0 0 0) inertia_xx=0 inertia_yy=0 inertia_zz=0
    Body pelvis: mass=10.74885 mass_center=(-0.0880059 0 0) inertia_xx=0.0908378 inertia_yy=0.0908378
        inertia_zz=0.06578066 meshes=(r_pelvis.vtp l_pelvis.vtp sacrum.vtp)
      CustomJoint ground_pelvis: parent_body=ground location_in_parent=(0 0 0) location=(0 0 0)
        Coordinate pelvis_tilt: motion_type=rotational default_value=0 range=(-1.570796 1.570796) clamped=true
        Coordinate pelvis_list: motion_type=rotational default_value=0 range=(-1.570796 1.570796) clamped=true
        Coordinate pelvis_rotation: motion_type=rotational default_value=0 range=(-1.570796 1.570796) clamped=true
        Coordinate pelvis_tx: motion_type=translational default_value=0 range=(-5 5) clamped=true
        Coordinate pelvis_ty: motion_type=translational default_value=0.93 range=(-1 2) clamped=true
        Coordinate pelvis_tz: motion_type=translational default_value=0 range=(-3 3) clamped=true
        SpatialTransform:
          TransformAxis rotation1: coordinates=pelvis_tilt axis=(0 0 1) LinearFunction(coefficients=1 0)
          TransformAxis rotation2: coordinates=pelvis_list axis=(1 0 0) LinearFunction(coefficients=1 0)
          TransformAxis rotation3: coordinates=pelvis_rotation axis=(0 1 0) LinearFunction(coefficients=1 0)
          TransformAxis translation1: coordinates=pelvis_tx axis=(1 0 0) LinearFunction(coefficients=1 0)
          TransformAxis translation2: coordinates=pelvis_ty axis=(0 1 0) LinearFunction(coefficients=1 0)
          TransformAxis translation3: coordinates=pelvis_tz axis=(0 0 1) LinearFunction(coefficients=1 0)
      WrapEllipsoid PS_at_brim_r: translation=(-0.0993334 -0.0654 0.060825) quadrant=all
          dimensions=(0.0647285 0.0492 0.065832)
      WrapEllipsoid IL_at_brim_r: translation=(-0.0852674 -0.0557 0.0700972) quadrant=all
          dimensions=(0.0683384 0.0665 0.065832)
      WrapEllipsoid Gmax_at_pelvis_r: xyz_body_rotation=(-0.637045 0.383623 -0.684867)
          translation=(-0.09896 -0.0825 0.0616595) quadrant=all dimensions=(0.04529 0.0427852 0.0606652)
      WrapEllipsoid PS_at_brim_l: translation=(-0.0993334 -0.0654 -0.060825) quadrant=all
          dimensions=(0.0647285 0.0492 0.065832)
      WrapEllipsoid IL_at_brim_l: translation=(-0.0852674 -0.0557 -0.0700972) quadrant=all
          dimensions=(0.0683384 0.0665 0.065832)
      WrapEllipsoid Gmax_at_pelvis_l: xyz_body_rotation=(0.637045 -0.383623 -0.684867)
          translation=(-0.09896 -0.0825 -0.0616595) quadrant=all dimensions=(0.04529 0.0427852 0.0606652)
    Body femur_r: mass=10.04832 mass_center=(0 -0.159273 0) inertia_xx=0.1266139 inertia_yy=0.03256326
        inertia_zz=0.1266139 meshes=r_femur.vtp
      CustomJoint hip_r: parent_body=pelvis location_in_parent=(-0.0700512 -0.07849 0.07163629) location=(0 0 0)
        Coordinate hip_flexion_r: motion_type=rotational default_value=0 range=(-0.5235988 2.094395) clamped=true
        Coordinate hip_adduction_r: motion_type=rotational default_value=0 range=(-0.8726646 0.5235988) clamped=true
        Coordinate hip_rotation_r: motion_type=rotational default_value=0 range=(-0.6981317 0.6981317) clamped=true
        SpatialTransform: axes_held_at_zero=(translation1 translation2 translation3)
          TransformAxis rotation1: coordinates=hip_flexion_r axis=(0 0 1)
            SimmSpline: x=(-6.28319 6.28319) y=(-6.28319 6.28319)
          TransformAxis rotation2: coordinates=hip_adduction_r axis=(1 0 0)
            SimmSpline: x=(-6.28319 6.28319) y=(-6.28319 6.28319)
          TransformAxis rotation3: coordinates=hip_rotation_r axis=(0 1 0)
            SimmSpline: x=(-6.28319 6.28319) y=(-6.28319 6.28319)
      WrapEllipsoid Gastroc_at_condyles_r: xyz_body_rotation=(0.0589921 -0.0937242 0.0232129)
          translation=(0.00444815 -0.381789 0.000278009) quadrant=all dimensions=(0.027801 0.0234216 0.0463366)
    Body femur_wlkr_r: mass=0 mass_center=(0 0 0) inertia_xx=0 inertia_yy=0 inertia_zz=0
      WeldJoint femur_coord_r: parent_body=femur_r location_in_parent=(-0.007291281 -0.3822191 -0.00254842)
          orientation_in_parent=(-1.641249 1.446065 1.5708) location=(0 0 0) orientation=(0.0002370565 -0.001206518 0)
    Body tibia_wlkr_r: mass=0 mass_center=(0 0 0) inertia_xx=0 inertia_yy=0 inertia_zz=0
      CustomJoint walker_knee_r: parent_body=femur_wlkr_r location_in_parent=(0 0 0) location=(0 0 0)
        Coordinate knee_angle_r: motion_type=rotational default_value=0 range=(0 1.745329) clamped=true
        SpatialTransform: axes_held_at_zero=translation3
          TransformAxis rotation1: coordinates=knee_angle_r axis=(1 0 0) LinearFunction(coefficients=1 0)
          TransformAxis rotation2: coordinates=knee_angle_r axis=(0 0 1)
            SimmSpline: x=(0 0.174533 0.349066 0.523599 0.698132 0.872665 1.0472 1.22173 1.39626 1.5708 1.74533 1.91986 2.0944)
                y=(0 0.0126809 0.0226969 0.0296054 0.0332049 0.0335354 0.0308779 0.0257548 0.0189295 0.011407 0.00443314 -0.00050475 -0.0016782)
          TransformAxis rotation3: coordinates=knee_angle_r axis=(0 1 0)
            SimmSpline: x=(0 0.174533 0.349066 0.523599 0.698132 0.872665 1.0472 1.22173 1.39626 1.5708 1.74533 1.91986 2.0944)
                y=(0 0.059461 0.109399 0.150618 0.18392 0.210107 0.229983 0.24435 0.254012 0.25977 0.262428 0.262788 0.261654)
          TransformAxis translation1: coordinates=knee_angle_r axis=(0 1 0)
            MultiplierFunction: scale=1
              SimmSpline: x=(0 0.174533 0.349066 0.523599 0.698132 0.872665 1.0472 1.22173 1.39626 1.5708 1.74533 1.91986 2.0944)
                  y=(0 0.000479 0.000835 0.001086 0.001251 0.001346 0.001391 0.001403 0.0014 0.0014 0.001421 0.001481 0.001599)
          TransformAxis translation2: coordinates=knee_angle_r axis=(0 0 1)
            MultiplierFunction: scale=1
              SimmSpline: x=(0 0.174533 0.349066 0.523599 0.698132 0.872665 1.0472 1.22173 1.39626 1.5708 1.74533 1.91986 2.0944)
                  y=(0 0.000988 0.001899 0.002734 0.003492 0.004173 0.004777 0.005305 0.005756 0.00613 0.006427 0.006648 0.006792)
    Body tibia_r: mass=3.96206 mass_center=(0 -0.199657 0) inertia_xx=0.06159526 inertia_yy=0.006231428
        inertia_zz=0.06159526 meshes=(r_tibialoan.vtp r_fibula.vtp)
      WeldJoint tibia_coord_r: parent_body=tibia_wlkr_r location_in_parent=(-0.001731 0.002389 0.008452)
          orientation_in_parent=(1.695412 -1.500024 1.570796) location=(0 0 0)
      WrapEllipsoid GR_at_condyles_r: xyz_body_rotation=(0 0 -0.18326) translation=(0 0 0) quadrant=all
          dimensions=(0.038494 0.0679068 0.0569923)
      WrapEllipsoid SM_at_condyles_r: xyz_body_rotation=(0 0 -0.296706) translation=(0 0 0) quadrant=all
          dimensions=(0.0376388 0.0643774 0.0522875)
      WrapEllipsoid ST_at_condyles_r: xyz_body_rotation=(0 0 -0.270526) translation=(0 0 0) quadrant=all
          dimensions=(0.0454445 0.0737882 0.0611624)
      WrapEllipsoid BFLH_at_gastroc_r: xyz_body_rotation=(0 0 0.270526) translation=(-0.066188 -0.0534701 0.000748491)
          quadrant=y dimensions=(0.035821 0.0213879 0.0890705)
      WrapCylinder Gastroc_at_shank_r: xyz_body_rotation=(2.96723 0.0289725 -1.47812)
          translation=(-0.00791262 -0.0791357 -0.0035286) quadrant=-y radius=0.05881347 length=0.1069277
    Body shaft_axis_r: mass=0 mass_center=(0 0 0) inertia_xx=0 inertia_yy=0 inertia_zz=0
      WeldJoint femoral_shaft_r: parent_body=femur_r location_in_parent=(-0.01415066 -0.03189691 0.03220272)
          orientation_in_parent=(0.1117011 0 0.03665191) location=(0 0 0)
      WrapEllipsoid AB_at_femshaft_r: xyz_body_rotation=(0 0 0.139626) translation=(0.0268 -0.0843 0) quadrant=all
          dimensions=(0.0165 0.07 0.021)
      WrapEllipsoid AL_at_femshaft_r: xyz_body_rotation=(0 0 0.0174533) translation=(0.0386 -0.2064 0) quadrant=all
          dimensions=(0.0201 0.1 0.018)
      WrapEllipsoid AMprox_at_femshaft_r: xyz_body_rotation=(0 0 0.174533) translation=(0.0197 -0.0442 0) quadrant=all
          dimensions=(0.0211 0.07 0.032)
      WrapEllipsoid AMmid_at_femshaft_r: xyz_body_rotation=(0 0 0.0872665) translation=(0.0336 -0.1284 0) quadrant=all
          dimensions=(0.0214 0.12 0.031)
      WrapEllipsoid AMdist_at_femshaft_r: xyz_body_rotation=(0 0 0.139626) translation=(0.0376 -0.2293 0) quadrant=all
          dimensions=(0.0218 0.2 0.0215)
      WrapEllipsoid AMisch_at_condyles_r: xyz_body_rotation=(0 0 -0.471239) translation=(-0.026 -0.344 0) quadrant=all
          dimensions=(0.05 0.24 0.0402)
      WrapEllipsoid PECT_at_femshaft_r: xyz_body_rotation=(0 0 0.174533) translation=(0.021 -0.052 0) quadrant=all
          dimensions=(0.0166 0.05 0.0131)
      WrapCylinder KnExt_at_fem_r: xyz_body_rotation=(-0.172089 0.0570723 -0.92869) translation=(0.0053 -0.3701 0.0086)
          quadrant=all radius=0.025 length=0.1
    Body patella_r: mass=0.09210746 mass_center=(0.0018 0.0264 0) inertia_xx=3.066687e-6 inertia_yy=1.400846e-5
        inertia_zz=1.400846e-5 meshes=r_pat.vtp
      CustomJoint patellofemoral_r: parent_body=femur_r location_in_parent=(0 0 0) location=(0 0 0)
        Coordinate knee_angle_r_beta: motion_type=rotational default_value=0 range=(-99999.9 99999.9) clamped=false
        SpatialTransform: axes_held_at_zero=(rotation2 rotation3 translation3)
          TransformAxis rotation1: coordinates=knee_angle_r_beta axis=(0 0 1)
            SimmSpline f11: x=(0 0.174533 0.349066 0.523599 0.698132 0.872665 1.0472 1.22173 1.39626 1.5708 1.74533 1.91986 2.0944)
                y=(0.00113686 -0.00629212 -0.105582 -0.253683 -0.414245 -0.579047 -0.747244 -0.91799 -1.09044 -1.26379 -1.43763 -1.61186 -1.78634)
          TransformAxis translation1: coordinates=knee_angle_r_beta axis=(1 0 0)
            MultiplierFunction: scale=0.926697
              SimmSpline f9: x=(0 0.174533 0.349066 0.523599 0.698132 0.872665 1.0472 1.22173 1.39626 1.5708 1.74533 1.91986 2.0944)
                  y=(0.04435 0.040692 0.035581 0.029012 0.021473 0.013523 0.005483 -0.002412 -0.009959 -0.016903 -0.022926 -0.027739 -0.030815)
          TransformAxis translation2: coordinates=knee_angle_r_beta axis=(0 1 0)
            MultiplierFunction: scale=0.9369049
              SimmSpline f10: x=(0 0.174533 0.349066 0.523599 0.698132 0.872665 1.0472 1.22173 1.39626 1.5708 1.74533 1.91986 2.0944)
                  y=(-0.418712 -0.426965 -0.43422 -0.440152 -0.444617 -0.447495 -0.448724 -0.448337 -0.446353 -0.442826 -0.438035 -0.432448 -0.426632)
    Body talus_r: mass=0.1069676 mass_center=(0 0 0) inertia_xx=0.001025743 inertia_yy=0.001024876
        inertia_zz=0.001025743 meshes=r_talus.vtp
      CustomJoint ankle_r: parent_body=tibia_r location_in_parent=(-0.01058477 -0.4277605 0)
          orientation_in_parent=(0.01123463 -0.02176978 0) location=(0 0 0)
        Coordinate ankle_angle_r: motion_type=rotational default_value=0 range=(-0.6981317 0.5235988) clamped=true
        SpatialTransform: axes_held_at_zero=(rotation2 rotation3 translation1 translation2 translation3)
          TransformAxis rotation1: coordinates=ankle_angle_r axis=(-0.105014 -0.1740221 0.9791263)
            SimmSpline: x=(-6.28319 6.28319) y=(-6.28319 6.28319)
    Body calcn_r: mass=1.335665 mass_center=(0.0978725 0.0293618 0) inertia_xx=0.00143297 inertia_yy=0.003991845
        inertia_zz=0.004196555 meshes=r_foot.vtp
      CustomJoint subtalar_r: parent_body=talus_r location_in_parent=(-0.0477324 -0.04110147 0.0077515)
          orientation_in_parent=(0 -0.01978953 0) location=(-4.879092e-5 6.423341e-5 0.0001273243)
          orientation=(0.006987752 0.01661201 0)
        Coordinate subtalar_angle_r: motion_type=rotational default_value=0 range=(-0.3490659 0.3490659) clamped=true
        SpatialTransform: axes_held_at_zero=(rotation2 rotation3 translation1 translation2 translation3)
          TransformAxis rotation1: coordinates=subtalar_angle_r axis=(0.78718 0.604747 -0.120949)
            SimmSpline: x=(-6.28319 6.28319) y=(-6.28319 6.28319)
    Body toes_r: mass=0.231444 mass_center=(0.0338639 0.00587235 -0.0171277) inertia_xx=0.000102355
        inertia_yy=0.00020471 inertia_zz=0.00102355 meshes=r_bofoot.vtp
      CustomJoint mtp_r: parent_body=calcn_r location_in_parent=(0.1749961 -0.00195745 0.001057023) location=(0 0 0)
        Coordinate mtp_angle_r: motion_type=rotational default_value=0 range=(-0.5235988 0.5235988) clamped=true
        SpatialTransform: axes_held_at_zero=(rotation2 rotation3 translation1 translation2 translation3)
          TransformAxis rotation1: coordinates=mtp_angle_r axis=(0.5809542 0 -0.8139363)
            SimmSpline: x=(-6.28319 6.28319) y=(-6.28319 6.28319)
    Body femur_l: mass=10.06481 mass_center=(0 -0.159535 0) inertia_xx=0.1271846 inertia_yy=0.03261669
        inertia_zz=0.1271846 meshes=l_femur.vtp
      CustomJoint hip_l: parent_body=pelvis location_in_parent=(-0.0700512 -0.07849 -0.07163629) location=(0 0 0)
        Coordinate hip_flexion_l: motion_type=rotational default_value=0 range=(-0.5235988 2.094395) clamped=true
        Coordinate hip_adduction_l: motion_type=rotational default_value=0 range=(-0.8726646 0.5235988) clamped=true
        Coordinate hip_rotation_l: motion_type=rotational default_value=0 range=(-0.6981317 0.6981317) clamped=true
        SpatialTransform: axes_held_at_zero=(translation1 translation2 translation3)
          TransformAxis rotation1: coordinates=hip_flexion_l axis=(0 0 1) LinearFunction(coefficients=1 0)
          TransformAxis rotation2: coordinates=hip_adduction_l axis=(1 0 0)
            SimmSpline: x=(-6.28319 6.28319) y=(6.28319 -6.28319)
          TransformAxis rotation3: coordinates=hip_rotation_l axis=(0 1 0)
            SimmSpline: x=(-6.28319 6.28319) y=(6.28319 -6.28319)
      WrapEllipsoid Gastroc_at_condyles_l: xyz_body_rotation=(-0.0589921 0.0937242 0.0232129)
          translation=(0.00444815 -0.382415 -0.000278009) quadrant=all dimensions=(0.027801 0.02346 0.0463369)
    Body femur_wlkr_l: mass=0 mass_center=(0 0 0) inertia_xx=0 inertia_yy=0 inertia_zz=0
      WeldJoint femur_coord_l: parent_body=femur_l location_in_parent=(-0.008663093 -0.3828468 0.00254842)
          orientation_in_parent=(1.641143 -1.446528 1.5708) location=(0 0 0) orientation=(0.0004569839 -0.004494983 0)
    Body tibia_wlkr_l: mass=0 mass_center=(0 0 0) inertia_xx=0 inertia_yy=0 inertia_zz=0
      CustomJoint walker_knee_l: parent_body=femur_wlkr_l location_in_parent=(0 0 0) location=(0 0 0)
        Coordinate knee_angle_l: motion_type=rotational default_value=0 range=(0 1.745329) clamped=true
        SpatialTransform: axes_held_at_zero=translation3
          TransformAxis rotation1: coordinates=knee_angle_l axis=(1 0 0)
            SimmSpline: x=(-6.28319 6.28319) y=(6.28319 -6.28319)
          TransformAxis rotation2: coordinates=knee_angle_l axis=(0 0 1)
            SimmSpline: x=(0 0.174533 0.349066 0.523599 0.698132 0.872665 1.0472 1.22173 1.39626 1.5708 1.74533 1.91986 2.0944)
                y=(0 0.0126809 0.0226969 0.0296054 0.0332049 0.0335354 0.0308779 0.0257548 0.0189295 0.011407 0.00443314 -0.00050475 -0.0016782)
          TransformAxis rotation3: coordinates=knee_angle_l axis=(0 1 0)
            SimmSpline: x=(0 0.174533 0.349066 0.523599 0.698132 0.872665 1.0472 1.22173 1.39626 1.5708 1.74533 1.91986 2.0944)
                y=(0 -0.059461 -0.109399 -0.150618 -0.18392 -0.210107 -0.229983 -0.24435 -0.254012 -0.25977 -0.262428 -0.262788 -0.261654)
          TransformAxis translation1: coordinates=knee_angle_l axis=(0 1 0)
            MultiplierFunction: scale=1
              SimmSpline: x=(0 0.174533 0.349066 0.523599 0.698132 0.872665 1.0472 1.22173 1.39626 1.5708 1.74533 1.91986 2.0944)
                  y=(0 0.000479 0.000835 0.001086 0.001251 0.001346 0.001391 0.001403 0.0014 0.0014 0.001421 0.001481 0.001599)
          TransformAxis translation2: coordinates=knee_angle_l axis=(0 0 1)
            MultiplierFunction: scale=1
              SimmSpline: x=(0 0.174533 0.349066 0.523599 0.698132 0.872665 1.0472 1.22173 1.39626 1.5708 1.74533 1.91986 2.0944)
                  y=(0 -0.000988 -0.001899 -0.002734 -0.003492 -0.004173 -0.004777 -0.005305 -0.005756 -0.00613 -0.006427 -0.006648 -0.006792)
    Body tibia_l: mass=3.963129 mass_center=(0 -0.199711 0) inertia_xx=0.06164344 inertia_yy=0.006233109
        inertia_zz=0.06164344 meshes=(l_tibialoan.vtp l_fibula.vtp)
      WeldJoint tibia_coord_l: parent_body=tibia_wlkr_l location_in_parent=(-0.001731 0.002389 -0.008452)
          orientation_in_parent=(-1.695412 1.500024 1.570796) location=(0 0 0)
      WrapEllipsoid GR_at_condyles_l: xyz_body_rotation=(0 0 -0.18326) translation=(0 0 0) quadrant=all
          dimensions=(0.0384943 0.0679245 0.0569923)
      WrapEllipsoid SM_at_condyles_l: xyz_body_rotation=(0 0 -0.296706) translation=(0 0 0) quadrant=all
          dimensions=(0.0376397 0.0643933 0.0522875)
      WrapEllipsoid ST_at_condyles_l: xyz_body_rotation=(0 0 -0.270526) translation=(0 0 0) quadrant=all
          dimensions=(0.0454454 0.0738066 0.0611624)
      WrapEllipsoid BFLH_at_gastroc_l: xyz_body_rotation=(0 0 0.270526) translation=(-0.066188 -0.0534846 -0.000748491)
          quadrant=y dimensions=(0.0358217 0.0213933 0.0890705)
      WrapCylinder Gastroc_at_shank_l: xyz_body_rotation=(-2.96723 -0.0289725 -1.47812)
          translation=(-0.00791262 -0.0791571 0.0035286) quadrant=-y radius=0.05882117 length=0.1069286
    Body shaft_axis_l: mass=0 mass_center=(0 0 0) inertia_xx=0 inertia_yy=0 inertia_zz=0
      WeldJoint femoral_shaft_l: parent_body=femur_l location_in_parent=(-0.01415066 -0.03189691 -0.03220272)
          orientation_in_parent=(-0.1117011 0 0.03665191) location=(0 0 0)
      WrapEllipsoid AB_at_femshaft_l: xyz_body_rotation=(0 0 0.139626) translation=(0.0268 -0.0843 0) quadrant=all
          dimensions=(0.0165 0.07 0.021)
      WrapEllipsoid AL_at_femshaft_l: xyz_body_rotation=(0 0 0.0174533) translation=(0.0386 -0.2064 0) quadrant=all
          dimensions=(0.0201 0.1 0.018)
      WrapEllipsoid AMprox_at_femshaft_l: xyz_body_rotation=(0 0 0.174533) translation=(0.0197 -0.0442 0) quadrant=all
          dimensions=(0.0211 0.07 0.032)
      WrapEllipsoid AMmid_at_femshaft_l: xyz_body_rotation=(0 0 0.0872665) translation=(0.0336 -0.1284 0) quadrant=all
          dimensions=(0.0214 0.12 0.031)
      WrapEllipsoid AMdist_at_femshaft_l: xyz_body_rotation=(0 0 0.139626) translation=(0.0376 -0.2293 0) quadrant=all
          dimensions=(0.0218 0.2 0.0215)
      WrapEllipsoid AMisch_at_condyles_l: xyz_body_rotation=(0 0 -0.471239) translation=(-0.026 -0.344 0) quadrant=all
          dimensions=(0.05 0.24 0.0402)
      WrapEllipsoid PECT_at_femshaft_l: xyz_body_rotation=(0 0 0.174533) translation=(0.021 -0.052 0) quadrant=all
          dimensions=(0.0166 0.05 0.0131)
      WrapCylinder KnExt_at_fem_l: xyz_body_rotation=(0.172089 -0.0570723 0.92869) translation=(0.0053 -0.3701 -0.0086)
          quadrant=all radius=0.025 length=0.1
    Body patella_l: mass=0.09210746 mass_center=(0.0018 0.0264 0) inertia_xx=3.066687e-6 inertia_yy=1.400846e-5
        inertia_zz=1.400846e-5 meshes=l_pat.vtp
      CustomJoint patellofemoral_l: parent_body=femur_l location_in_parent=(0 0 0) location=(0 0 0)
        Coordinate knee_angle_l_beta: motion_type=rotational default_value=0 range=(-99999.9 99999.9) clamped=false
        SpatialTransform: axes_held_at_zero=(rotation2 rotation3 translation3)
          TransformAxis rotation1: coordinates=knee_angle_l_beta axis=(0 0 1)
            SimmSpline f25: x=(0 0.174533 0.349066 0.523599 0.698132 0.872665 1.0472 1.22173 1.39626 1.5708 1.74533 1.91986 2.0944)
                y=(0.00113686 -0.00629212 -0.105582 -0.253683 -0.414245 -0.579047 -0.747244 -0.91799 -1.09044 -1.26379 -1.43763 -1.61186 -1.78634)
          TransformAxis translation1: coordinates=knee_angle_l_beta axis=(1 0 0)
            MultiplierFunction: scale=0.926697
              SimmSpline f23: x=(0 0.174533 0.349066 0.523599 0.698132 0.872665 1.0472 1.22173 1.39626 1.5708 1.74533 1.91986 2.0944)
                  y=(0.04435 0.040692 0.035581 0.029012 0.021473 0.013523 0.005483 -0.002412 -0.009959 -0.016903 -0.022926 -0.027739 -0.030815)
          TransformAxis translation2: coordinates=knee_angle_l_beta axis=(0 1 0)
            MultiplierFunction: scale=0.938442
              SimmSpline f24: x=(0 0.174533 0.349066 0.523599 0.698132 0.872665 1.0472 1.22173 1.39626 1.5708 1.74533 1.91986 2.0944)
                  y=(-0.418712 -0.426965 -0.43422 -0.440152 -0.444617 -0.447495 -0.448724 -0.448337 -0.446353 -0.442826 -0.438035 -0.432448 -0.426632)
    Body talus_l: mass=0.1074957 mass_center=(0 0 0) inertia_xx=0.001035902 inertia_yy=0.001031598
        inertia_zz=0.001035902 meshes=l_talus.vtp
      CustomJoint ankle_l: parent_body=tibia_l location_in_parent=(-0.0107609 -0.4278763 0)
          orientation_in_parent=(-0.01642934 0.01075015 0) location=(0 0 0)
        Coordinate ankle_angle_l: motion_type=rotational default_value=0 range=(-0.6981317 0.5235988) clamped=true
        SpatialTransform: axes_held_at_zero=(rotation2 rotation3 translation1 translation2 translation3)
          TransformAxis rotation1: coordinates=ankle_angle_l axis=(-0.105014 -0.1740221 -0.9791263)
            SimmSpline: x=(-6.28319 6.28319) y=(6.28319 -6.28319)
    Body calcn_l: mass=1.335665 mass_center=(0.0978725 0.0293618 0) inertia_xx=0.00143297 inertia_yy=0.003991845
        inertia_zz=0.004196555 meshes=l_foot.vtp
      CustomJoint subtalar_l: parent_body=talus_l location_in_parent=(-0.0477324 -0.04130432 -0.0077515)
          orientation_in_parent=(0 0.01140921 0) location=(6.215051e-5 0.0002215257 2.404678e-5)
          orientation=(0.01058229 -0.01050455 0)
        Coordinate subtalar_angle_l: motion_type=rotational default_value=0 range=(-0.3490659 0.3490659) clamped=true
        SpatialTransform: axes_held_at_zero=(rotation2 rotation3 translation1 translation2 translation3)
          TransformAxis rotation1: coordinates=subtalar_angle_l axis=(0.78718 0.604747 0.120949)
            SimmSpline: x=(-6.28319 6.28319) y=(6.28319 -6.28319)
    Body toes_l: mass=0.231444 mass_center=(0.0338639 0.00587235 0.0171277) inertia_xx=0.000102355
        inertia_yy=0.00020471 inertia_zz=0.00102355 meshes=l_bofoot.vtp
      CustomJoint mtp_l: parent_body=calcn_l location_in_parent=(0.1749961 -0.00195745 -0.001057023) location=(0 0 0)
        Coordinate mtp_angle_l: motion_type=rotational default_value=0 range=(-0.5235988 0.5235988) clamped=true
        SpatialTransform: axes_held_at_zero=(rotation2 rotation3 translation1 translation2 translation3)
          TransformAxis rotation1: coordinates=mtp_angle_l axis=(0.5809542 0 0.8139363)
            SimmSpline: x=(-6.28319 6.28319) y=(6.28319 -6.28319)
    Body torso: mass=28.66508 mass_center=(-0.031573 0.327782 0) inertia_xx=1.690737 inertia_yy=0.9222646
        inertia_zz=1.690737 meshes=(hat_spine.vtp hat_jaw.vtp hat_skull.vtp hat_ribs_scap.vtp)
      CustomJoint back: parent_body=pelvis location_in_parent=(-0.1253493 0.0815 0) location=(0 0 0)
        Coordinate lumbar_extension: motion_type=rotational default_value=0 range=(-1.570796 1.570796) clamped=true
        Coordinate lumbar_bending: motion_type=rotational default_value=0 range=(-1.570796 1.570796) clamped=true
        Coordinate lumbar_rotation: motion_type=rotational default_value=0 range=(-1.570796 1.570796) clamped=true
        SpatialTransform: axes_held_at_zero=(translation1 translation2 translation3)
          TransformAxis rotation1: coordinates=lumbar_extension axis=(0 0 1) LinearFunction(coefficients=1 0)
          TransformAxis rotation2: coordinates=lumbar_bending axis=(1 0 0) LinearFunction(coefficients=1 0)
          TransformAxis rotation3: coordinates=lumbar_rotation axis=(0 1 0) LinearFunction(coefficients=1 0)
    Body humerus_r: mass=2.171791 mass_center=(0 -0.179374 0) inertia_xx=0.01517706 inertia_yy=0.005235614
        inertia_zz=0.01703576 meshes=humerus_rv.vtp
      CustomJoint acromial_r: parent_body=torso location_in_parent=(0.00332043 0.3805345 0.1845387) location=(0 0 0)
        Coordinate arm_flex_r: motion_type=rotational default_value=0 range=(-1.570796 1.570796) clamped=true
        Coordinate arm_add_r: motion_type=rotational default_value=0 range=(-2.094395 1.570796) clamped=true
        Coordinate arm_rot_r: motion_type=rotational default_value=0 range=(-1.570796 1.570796) clamped=true
        SpatialTransform: axes_held_at_zero=(translation1 translation2 translation3)
          TransformAxis rotation1: coordinates=arm_flex_r axis=(0 0 1) LinearFunction(coefficients=1 0)
          TransformAxis rotation2: coordinates=arm_add_r axis=(1 0 0) LinearFunction(coefficients=1 0)
          TransformAxis rotation3: coordinates=arm_rot_r axis=(0 1 0) LinearFunction(coefficients=1 0)
    Body ulna_r: mass=0.6491332 mass_center=(0 -0.126381 0) inertia_xx=0.003480006 inertia_yy=0.0007260782
        inertia_zz=0.003774902 meshes=ulna_rv.vtp
      CustomJoint elbow_r: parent_body=humerus_r location_in_parent=(0.01433231 -0.3121541 -0.01046246)
          location=(0 0 0)
        Coordinate elbow_flex_r: motion_type=rotational default_value=0 range=(0 2.618) clamped=true
        SpatialTransform: axes_held_at_zero=(rotation2 rotation3 translation1 translation2 translation3)
          TransformAxis rotation1: coordinates=elbow_flex_r axis=(0.226047 0.022269 0.9738618)
              LinearFunction(coefficients=1 0)
    Body radius_r: mass=0.6491332 mass_center=(0 -0.126381 0) inertia_xx=0.003480006 inertia_yy=0.0007260782
        inertia_zz=0.003774902 meshes=radius_rv.vtp
      CustomJoint radioulnar_r: parent_body=ulna_r location_in_parent=(-0.007053832 -0.01363895 0.02735024)
          location=(0 0 0)
        Coordinate pro_sup_r: motion_type=rotational default_value=0 range=(0 1.570796) clamped=true
        SpatialTransform: axes_held_at_zero=(rotation2 rotation3 translation1 translation2 translation3)
          TransformAxis rotation1: coordinates=pro_sup_r axis=(0.05639803 0.9984065 0.001952)
              LinearFunction(coefficients=1 0)
    Body hand_r: mass=0.4888534 mass_center=(0 -0.068095 0) inertia_xx=0.0009531306 inertia_yy=0.000584487
        inertia_zz=0.001431833
        meshes=(pisiform_rvs.vtp lunate_rvs.vtp scaphoid_rvs.vtp triquetrum_rvs.vtp hamate_rvs.vtp capitate_rvs.vtp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)
      CustomJoint radius_hand_r: parent_body=radius_r location_in_parent=(-0.009224403 -0.2472994 0.01427124)
          location=(0 0 0)
        Coordinate wrist_flex_r: motion_type=rotational default_value=0 range=(-1.22173 1.22173) clamped=true
            locked=true
        Coordinate wrist_dev_r: motion_type=rotational default_value=0 range=(-0.4363323 0.6108652) clamped=true
            locked=true
        SpatialTransform: axes_held_at_zero=(rotation3 translation1 translation2 translation3)
          TransformAxis rotation1: coordinates=wrist_flex_r axis=(0 0 1) LinearFunction(coefficients=1 0)
          TransformAxis rotation2: coordinates=wrist_dev_r axis=(1 0 0) LinearFunction(coefficients=1 0)
    Body humerus_l: mass=2.171791 mass_center=(0 -0.179374 0) inertia_xx=0.01517706 inertia_yy=0.005235614
        inertia_zz=0.01703576 meshes=humerus_lv.vtp
      CustomJoint acromial_l: parent_body=torso location_in_parent=(0.00332043 0.3805345 -0.1845387) location=(0 0 0)
        Coordinate arm_flex_l: motion_type=rotational default_value=0 range=(-1.570796 1.570796) clamped=true
        Coordinate arm_add_l: motion_type=rotational default_value=0 range=(-2.094395 1.570796) clamped=true
        Coordinate arm_rot_l: motion_type=rotational default_value=0 range=(-1.570796 1.570796) clamped=true
        SpatialTransform: axes_held_at_zero=(translation1 translation2 translation3)
          TransformAxis rotation1: coordinates=arm_flex_l axis=(0 0 1) LinearFunction(coefficients=1 0)
          TransformAxis rotation2: coordinates=arm_add_l axis=(-1 0 0) LinearFunction(coefficients=1 0)
          TransformAxis rotation3: coordinates=arm_rot_l axis=(0 -1 0) LinearFunction(coefficients=1 0)
    Body ulna_l: mass=0.6491332 mass_center=(0 -0.126381 0) inertia_xx=0.003480006 inertia_yy=0.0007260782
        inertia_zz=0.003774902 meshes=ulna_lv.vtp
      CustomJoint elbow_l: parent_body=humerus_l location_in_parent=(0.01433231 -0.3121541 0.01046246) location=(0 0 0)
        Coordinate elbow_flex_l: motion_type=rotational default_value=0 range=(0 2.618) clamped=true
        SpatialTransform: axes_held_at_zero=(rotation2 rotation3 translation1 translation2 translation3)
          TransformAxis rotation1: coordinates=elbow_flex_l axis=(-0.226047 -0.022269 0.9738618)
              LinearFunction(coefficients=1 0)
    Body radius_l: mass=0.6491332 mass_center=(0 -0.126381 0) inertia_xx=0.003480006 inertia_yy=0.0007260782
        inertia_zz=0.003774902 meshes=radius_lv.vtp
      CustomJoint radioulnar_l: parent_body=ulna_l location_in_parent=(-0.007053832 -0.01363895 -0.02735024)
          location=(0 0 0)
        Coordinate pro_sup_l: motion_type=rotational default_value=0 range=(0 1.570796) clamped=true
        SpatialTransform: axes_held_at_zero=(rotation2 rotation3 translation1 translation2 translation3)
          TransformAxis rotation1: coordinates=pro_sup_l axis=(-0.05639803 -0.9984065 0.001952)
              LinearFunction(coefficients=1 0)
    Body hand_l: mass=0.4888534 mass_center=(0 -0.068095 0) inertia_xx=0.0009531306 inertia_yy=0.000584487
        inertia_zz=0.001431833
        meshes=(pisiform_lvs.vtp lunate_lvs.vtp scaphoid_lvs.vtp triquetrum_lvs.vtp hamate_lvs.vtp capitate_lvs.vtp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)
      CustomJoint radius_hand_l: parent_body=radius_l location_in_parent=(-0.009224403 -0.2472994 -0.01427124)
          location=(0 0 0)
        Coordinate wrist_flex_l: motion_type=rotational default_value=0 range=(-1.22173 1.22173) clamped=true
            locked=true
        Coordinate wrist_dev_l: motion_type=rotational default_value=0 range=(-0.4363323 0.6108652) clamped=true
            locked=true
        SpatialTransform: axes_held_at_zero=(rotation3 translation1 translation2 translation3)
          TransformAxis rotation1: coordinates=wrist_flex_l axis=(0 0 1) LinearFunction(coefficients=1 0)
          TransformAxis rotation2: coordinates=wrist_dev_l axis=(-1 0 0) LinearFunction(coefficients=1 0)
    Body calcn_l_markerPlate: mass=0 mass_center=(0 0 0) inertia_xx=0 inertia_yy=0 inertia_zz=0
      WeldJoint calcn_l_markerPlate_jnt: parent_body=calcn_l location_in_parent=(0.06195707 0.03003727 -0.02367456)
          location=(0 0 0)
    Body calcn_r_markerPlate: mass=0 mass_center=(0 0 0) inertia_xx=0 inertia_yy=0 inertia_zz=0
      WeldJoint calcn_r_markerPlate_jnt: parent_body=calcn_r location_in_parent=(0.0663439 0.02919673 0.01213872)
          location=(0 0 0)
    Body femur_l_markerPlate: mass=0 mass_center=(0 0 0) inertia_xx=0 inertia_yy=0 inertia_zz=0
      WeldJoint femur_l_markerPlate_jnt: parent_body=femur_l location_in_parent=(0.03727254 -0.2772753 -0.04068067)
          orientation_in_parent=(3.603595e-5 -3.697816e-5 1.091951e-5) location=(0 0 0)
    Body femur_r_markerPlate: mass=0 mass_center=(0 0 0) inertia_xx=0 inertia_yy=0 inertia_zz=0
      WeldJoint femur_r_markerPlate_jnt: parent_body=femur_r location_in_parent=(0.04669863 -0.2932957 0.0007845223)
          orientation_in_parent=(2.751199e-5 5.599271e-5 2.512809e-5) location=(0 0 0)
    Body humerus_l_markerPlate: mass=0 mass_center=(0 0 0) inertia_xx=0 inertia_yy=0 inertia_zz=0
      WeldJoint humerus_l_markerPlate_jnt: parent_body=humerus_l location_in_parent=(-0.1231648 -0.1231648 -0.1231648)
          location=(0 0 0)
    Body humerus_r_markerPlate: mass=0 mass_center=(0 0 0) inertia_xx=0 inertia_yy=0 inertia_zz=0
      WeldJoint humerus_r_markerPlate_jnt: parent_body=humerus_r
          location_in_parent=(-0.09213907 -0.09213907 -0.09213907) location=(0 0 0)
    Body pelvis_markerPlate: mass=0 mass_center=(0 0 0) inertia_xx=0 inertia_yy=0 inertia_zz=0
      WeldJoint pelvis_markerPlate_jnt: parent_body=pelvis location_in_parent=(-0.06777387 0.03712719 0.00493723)
          orientation_in_parent=(2.192431e-5 9.552539e-5 -7.856168e-5) location=(0 0 0)
    Body radius_l_markerPlate: mass=0 mass_center=(0 0 0) inertia_xx=0 inertia_yy=0 inertia_zz=0
      WeldJoint radius_l_markerPlate_jnt: parent_body=radius_l location_in_parent=(-0.09512797 -0.09512797 -0.09512797)
          location=(0 0 0)
    Body radius_r_markerPlate: mass=0 mass_center=(0 0 0) inertia_xx=0 inertia_yy=0 inertia_zz=0
      WeldJoint radius_r_markerPlate_jnt: parent_body=radius_r location_in_parent=(-0.08826983 -0.08826983 -0.08826983)
          location=(0 0 0)
    Body tibia_l_markerPlate: mass=0 mass_center=(0 0 0) inertia_xx=0 inertia_yy=0 inertia_zz=0
      WeldJoint tibia_l_markerPlate_jnt: parent_body=tibia_l location_in_parent=(-0.001617419 -0.2658784 -0.03758487)
          orientation_in_parent=(-0.0002070988 0.0003731854 0.000619397) location=(0 0 0)
    Body tibia_r_markerPlate: mass=0 mass_center=(0 0 0) inertia_xx=0 inertia_yy=0 inertia_zz=0
      WeldJoint tibia_r_markerPlate_jnt: parent_body=tibia_r location_in_parent=(0.01660956 -0.2702115 0.01414374)
          orientation_in_parent=(-0.0004145173 -8.318331e-5 -0.0005158655) location=(0 0 0)
    Body toes_l_markerPlate: mass=0 mass_center=(0 0 0) inertia_xx=0 inertia_yy=0 inertia_zz=0
      WeldJoint toes_l_markerPlate_jnt: parent_body=toes_l location_in_parent=(0.02884186 0.004266663 -0.00882019)
          location=(0 0 0)
    Body toes_r_markerPlate: mass=0 mass_center=(0 0 0) inertia_xx=0 inertia_yy=0 inertia_zz=0
      WeldJoint toes_r_markerPlate_jnt: parent_body=toes_r location_in_parent=(0.02827455 0.002502103 -0.007252463)
          location=(0 0 0)
    Body torso_markerPlate: mass=0 mass_center=(0 0 0) inertia_xx=0 inertia_yy=0 inertia_zz=0
      WeldJoint torso_markerPlate_jnt: parent_body=torso location_in_parent=(-0.006338833 0.3521355 -0.0009472073)
          orientation_in_parent=(3.338939e-5 -8.387059e-6 -8.421592e-6) location=(0 0 0)
  ConstraintSet:
    CoordinateCouplerConstraint patellofemoral_knee_angle_r_con: independent_coordinate_names=knee_angle_r
        dependent_coordinate_name=knee_angle_r_beta scale_factor=1
        coupled_coordinates_function=LinearFunction(coefficients=1 0)
    CoordinateCouplerConstraint patellofemoral_knee_angle_l_con: independent_coordinate_names=knee_angle_l
        dependent_coordinate_name=knee_angle_l_beta scale_factor=1
        coupled_coordinates_function=LinearFunction(coefficients=1 0)
  ForceSet:
    Schutte1993Muscle_Deprecated [values shared by the 90 below unless stated]: min_control=0.01 max_control=1
        max_contraction_velocity=10 time_scale=0.1 activation1=7.6 activation2=2.5 damping=0.05
      tendon_force_length_curve: SimmSpline: x=(-10 -0.002 -0.001 0 0.00131 0.00281 0.00431 0.00581 0.00731 0.00881 0.0103 0.0118 0.0123 9.2 9.201 9.202 20)
          y=(0 0 0 0 0.0108 0.0257 0.0435 0.0652 0.0915 0.123 0.161 0.208 0.227 345 345 345 345)
      active_force_length_curve: SimmSpline: x=(-5.30769 -4.30769 -1.92308 -0.884615 -0.269231 0.230769 0.461538 0.52725 0.62875 0.71875 0.86125 1.045 1.2175 1.43875 1.5 1.61539 2 2.96154 3.69231 5.46154 9.9019)
          y=(0.012188 0.021899 0.036466 0.052493 0.075312 0.114158 0.157859 0.226667 0.636667 0.856667 0.95 0.993333 0.77 0.246667 0.193821 0.133252 0.072683 0.044417 0.036341 0.021899 0.007332)
      passive_force_length_curve: SimmSpline: x=(-5 0.998 0.999 1 1.1 1.2 1.3 1.4 1.5 1.6 1.601 1.602 5)
          y=(0 0 0 0 0.035 0.12 0.26 0.55 1.17 2 2 2 2)
    Schutte1993Muscle_Deprecated addbrev_r: max_isometric_force=303.7 optimal_fiber_length=0.1011403
        tendon_slack_length=0.03531572 pennation_angle_at_optimal=0.1064651 [radians]
      PathPoint P1: pelvis (-0.0237753 -0.094 0.014279)
      PathPoint P2: femur_r (-0.00185339 -0.110555 0.0230748)
      PathWrap: wrap_object=AB_at_femshaft_r method=hybrid
    Schutte1993Muscle_Deprecated addlong_r: max_isometric_force=399.5 optimal_fiber_length=0.1031712
        tendon_slack_length=0.123958 pennation_angle_at_optimal=0.1239184
      PathPoint P1: pelvis (-0.00943543 -0.0889 0.0175058)
      PathPoint P2: femur_r (0.0104346 -0.224266 0.0146696)
      PathWrap: wrap_object=AL_at_femshaft_r method=hybrid
    Schutte1993Muscle_Deprecated addmagDist_r: max_isometric_force=324.2 optimal_fiber_length=0.1653286
        tendon_slack_length=0.0839705 pennation_angle_at_optimal=0.2408554
      PathPoint P1: pelvis (-0.0921635 -0.12767 0.0369215)
      PathPoint P2: femur_r (0.0104253 -0.245938 0.0178853)
      PathWrap: wrap_object=AMdist_at_femshaft_r method=hybrid
    Schutte1993Muscle_Deprecated addmagIsch_r: max_isometric_force=324.2 optimal_fiber_length=0.1442399
        tendon_slack_length=0.2040783 pennation_angle_at_optimal=0.2076942
      PathPoint P1: pelvis (-0.111557 -0.12976 0.0386739)
      PathPoint P2: femur_r (0.00445741 -0.363491 -0.0303308)
      PathWrap: wrap_object=AMisch_at_condyles_r method=hybrid
    Schutte1993Muscle_Deprecated addmagMid_r: max_isometric_force=324.2 optimal_fiber_length=0.1297484
        tendon_slack_length=0.04522819 pennation_angle_at_optimal=0.2565634
      PathPoint P1: pelvis (-0.0655501 -0.12075 0.0264626)
      PathPoint P2: femur_r (0.00224261 -0.152154 0.0270781)
      PathWrap: wrap_object=AMmid_at_femshaft_r method=hybrid
    Schutte1993Muscle_Deprecated addmagProx_r: max_isometric_force=324.2 optimal_fiber_length=0.1023319
        tendon_slack_length=0.04166923 pennation_angle_at_optimal=0.3874631
      PathPoint P1: pelvis (-0.0385633 -0.10755 0.0126564)
      PathPoint P2: femur_r (-0.0141507 -0.0738843 0.0296728)
      PathWrap: wrap_object=AMprox_at_femshaft_r method=hybrid
    Schutte1993Muscle_Deprecated bflh_r: max_isometric_force=705.2 optimal_fiber_length=0.09255484
        tendon_slack_length=0.3053551 pennation_angle_at_optimal=0.2024582
      PathPoint P1: pelvis (-0.129457 -0.1191 0.0543345)
      PathPoint P2: tibia_r (-0.033896 -0.0454496 0.0356068)
      PathWrap: wrap_object=BFLH_at_gastroc_r method=hybrid
    Schutte1993Muscle_Deprecated bfsh_r: max_isometric_force=315.8 optimal_fiber_length=0.1061069
        tendon_slack_length=0.1000464 pennation_angle_at_optimal=0.2146755
      PathPoint P1: femur_r (0.00463348 -0.197781 0.0216847)
      PathPoint P2: tibia_r (-0.0321851 -0.044808 0.0340029)
      PathWrap: wrap_object=BFLH_at_gastroc_r method=hybrid
    Schutte1993Muscle_Deprecated edl_r: max_isometric_force=345.4 optimal_fiber_length=0.07175605
        tendon_slack_length=0.3803174 pennation_angle_at_optimal=0.1884956
      PathPoint P1: tibia_r (-0.0171084 -0.12373 0.0219201)
      PathPoint P2: tibia_r (0.0175361 -0.402095 0.0119759)
      PathPoint P3: calcn_r (0.0899448 0.0352341 0.00078298)
      PathPoint P4: calcn_r (0.158162 0.00538299 0.0127234)
      PathPoint P5: toes_r (0.000293618 0.00460001 0.0149745)
      PathPoint P6: toes_r (0.0433575 -0.00039149 0.0244681)
    Schutte1993Muscle_Deprecated ehl_r: max_isometric_force=165 optimal_fiber_length=0.07711985
        tendon_slack_length=0.3417811 pennation_angle_at_optimal=0.164061
      PathPoint P1: tibia_r (-0.0149698 -0.165757 0.0202093)
      PathPoint P2: tibia_r (0.00759184 -0.311089 0.0175361)
      PathPoint P3: tibia_r (0.0213855 -0.394931 -0.00299397)
      PathPoint P4: calcn_r (0.0949363 0.0380724 -0.0206511)
      PathPoint P5: calcn_r (0.126549 0.0302426 -0.0251532)
      PathPoint P6: calcn_r (0.169711 0.0136043 -0.0274043)
      PathPoint P7: toes_r (0.029166 0.00401277 -0.0239788)
      PathPoint P8: toes_r (0.0551022 0.00332767 -0.0182043)
    Schutte1993Muscle_Deprecated fdl_r: max_isometric_force=274.4 optimal_fiber_length=0.04571527
        tendon_slack_length=0.3871448 pennation_angle_at_optimal=0.2373648
      PathPoint P1: tibia_r (-0.00245933 -0.195915 -0.00192469)
      PathPoint P2: tibia_r (-0.0188192 -0.389797 -0.013259)
      PathPoint P3: calcn_r (0.0426724 0.0308298 -0.0274043)
      PathPoint P4: calcn_r (0.0692937 0.0172256 -0.0257405)
      PathPoint P5: calcn_r (0.162273 -0.00792767 0.0113532)
      PathPoint P6: toes_r (-0.00185958 -0.00763406 0.0143873)
      PathPoint P7: toes_r (0.0278937 -0.00694895 0.0210426)
      PathPoint P8: toes_r (0.0431618 -0.00587235 0.0236851)
    Schutte1993Muscle_Deprecated fhl_r: max_isometric_force=436.8 optimal_fiber_length=0.05377519
        tendon_slack_length=0.3632631 pennation_angle_at_optimal=0.2949606
      PathPoint P1: tibia_r (-0.0331475 -0.231312 0.0213855)
      PathPoint P2: tibia_r (-0.0258764 -0.392577 -0.00812648)
      PathPoint P3: calcn_r (0.0366043 0.0270128 -0.0235873)
      PathPoint P4: calcn_r (0.101592 0.00665533 -0.0250554)
      PathPoint P5: calcn_r (0.168928 -0.00518724 -0.0263277)
      PathPoint P6: toes_r (0.0151702 -0.00626384 -0.0259362)
      PathPoint P7: toes_r (0.0550044 -0.009983 -0.0177149)
    Schutte1993Muscle_Deprecated gaslat_r: max_isometric_force=606.4 optimal_fiber_length=0.06238396
        tendon_slack_length=0.4052835 pennation_angle_at_optimal=0.2094395
      PathPoint P1: femur_r (-0.00278009 -0.357335 0.0256695)
      PathPoint P2: calcn_r (0.00430639 0.0303405 -0.00518724)
      PathWrap: wrap_object=Gastroc_at_shank_r method=hybrid
      PathWrap: wrap_object=Gastroc_at_condyles_r method=hybrid
    Schutte1993Muscle_Deprecated gasmed_r: max_isometric_force=1308 optimal_fiber_length=0.05396754
        tendon_slack_length=0.4241214 pennation_angle_at_optimal=0.1727876
      PathPoint P1: femur_r (0.00741358 -0.3549 -0.0192753)
      PathPoint P2: calcn_r (0.00430639 0.0303405 -0.00518724)
      PathWrap: wrap_object=Gastroc_at_shank_r method=hybrid
      PathWrap: wrap_object=Gastroc_at_condyles_r method=hybrid
    Schutte1993Muscle_Deprecated gem_r: max_isometric_force=109 optimal_fiber_length=0.02693288
        tendon_slack_length=0.04376593 pennation_angle_at_optimal=0
      PathPoint P1: pelvis (-0.128922 -0.0764 0.062188)
      PathPoint P2: femur_r (-0.0131591 -0.00309179 0.0410527)
    Schutte1993Muscle_Deprecated glmax1_r: max_isometric_force=546.1 optimal_fiber_length=0.1500093
        tendon_slack_length=0.05091966 pennation_angle_at_optimal=0.3822271
      PathPoint P1: pelvis (-0.153232 0.0345 0.052202)
      PathPoint P2: pelvis (-0.156469 -0.0242 0.0722297)
      PathPoint P3: femur_r (-0.0411453 -0.0305431 0.0279862)
      PathPoint P4: femur_r (-0.0256695 -0.0530288 0.0435548)
      PathWrap: wrap_object=Gmax_at_pelvis_r method=hybrid
    Schutte1993Muscle_Deprecated glmax2_r: max_isometric_force=780.5 optimal_fiber_length=0.158979
        tendon_slack_length=0.07427127 pennation_angle_at_optimal=0.3822271
      PathPoint P1: pelvis (-0.163937 0.0087 0.0428371)
      PathPoint P2: pelvis (-0.167298 -0.0609 0.0753822)
      PathPoint P3: femur_r (-0.0417014 -0.0547152 0.0233528)
      PathPoint P4: femur_r (-0.0144565 -0.0951895 0.0388286)
      PathWrap: wrap_object=Gmax_at_pelvis_r method=hybrid
    Schutte1993Muscle_Deprecated glmax3_r: max_isometric_force=526.1 optimal_fiber_length=0.1690592
        tendon_slack_length=0.07127902 pennation_angle_at_optimal=0.3822271
      PathPoint P1: pelvis (-0.161821 -0.0525 0.0083449)
      PathPoint P2: pelvis (-0.15846 -0.1263 0.0403337)
      PathPoint P3: femur_r (-0.0260402 -0.105401 0.00871095)
      PathPoint P4: femur_r (-0.00556018 -0.132946 0.0380872)
      PathWrap: wrap_object=Gmax_at_pelvis_r method=hybrid
    Schutte1993Muscle_Deprecated glmed1_r: max_isometric_force=881.1 optimal_fiber_length=0.07210213
        tendon_slack_length=0.05557668 pennation_angle_at_optimal=0.3577925
      PathPoint P1: pelvis (-0.0553927 0.0245 0.108669)
      PathPoint P2: femur_r (-0.020202 -0.0109618 0.0514317)
    Schutte1993Muscle_Deprecated glmed2_r: max_isometric_force=616.5 optimal_fiber_length=0.07333722
        tendon_slack_length=0.06603351 pennation_angle_at_optimal=0.3577925
      PathPoint P1: pelvis (-0.105806 0.0316 0.0625867)
      PathPoint P2: femur_r (-0.0239088 -0.00543405 0.0488369)
    Schutte1993Muscle_Deprecated glmed3_r: max_isometric_force=702 optimal_fiber_length=0.07636048
        tendon_slack_length=0.04792063 pennation_angle_at_optimal=0.3577925
      PathPoint P1: pelvis (-0.143399 -0.0073 0.0487713)
      PathPoint P2: femur_r (-0.0286349 -0.00440346 0.0480029)
    Schutte1993Muscle_Deprecated glmin1_r: max_isometric_force=180 optimal_fiber_length=0.06672284
        tendon_slack_length=0.01569949 pennation_angle_at_optimal=0.1745329
      PathPoint P1: pelvis (-0.0577578 -0.0149 0.096615)
      PathPoint P2: femur_r (-0.00667222 -0.00974381 0.051895)
    Schutte1993Muscle_Deprecated glmin2_r: max_isometric_force=190 optimal_fiber_length=0.05499326
        tendon_slack_length=0.02553258 pennation_angle_at_optimal=0
      PathPoint P1: pelvis (-0.0766784 -0.0142 0.090032)
      PathPoint P2: femur_r (-0.00889629 -0.00974381 0.051895)
    Schutte1993Muscle_Deprecated glmin3_r: max_isometric_force=215 optimal_fiber_length=0.03817665
        tendon_slack_length=0.05123708 pennation_angle_at_optimal=0.01745329
      PathPoint P1: pelvis (-0.0982131 -0.0155 0.0739914)
      PathPoint P2: femur_r (-0.0125104 -0.00777631 0.0509683)
    Schutte1993Muscle_Deprecated grac_r: max_isometric_force=137.3 optimal_fiber_length=0.2178821
        tendon_slack_length=0.1587727 pennation_angle_at_optimal=0.143117
      PathPoint P1: pelvis (-0.0589527 -0.12932 0.0227723)
      PathPoint P2: tibia_r (-0.019696 -0.05085 -0.0316612)
      PathPoint P3: tibia_r (0.00190331 -0.0744518 -0.0168197)
      PathWrap: wrap_object=GR_at_condyles_r method=hybrid
    Schutte1993Muscle_Deprecated iliacus_r: max_isometric_force=621.9 optimal_fiber_length=0.1111502
        tendon_slack_length=0.09801233 pennation_angle_at_optimal=0.2495821
      PathPoint P1: pelvis (-0.0753091 0.0309 0.0781638)
      PathPoint P2: pelvis (-0.0168045 -0.0557 0.0700972)
      PathPoint P3: femur_r (-0.0021314 -0.0529351 0.0128811)
      PathPoint P4: femur_r (-0.0113057 -0.0596808 0.0181633)
      PathWrap: wrap_object=IL_at_brim_r method=hybrid range=(2 3)
    Schutte1993Muscle_Deprecated patlig_r: max_isometric_force=1 optimal_fiber_length=0.05286365
        tendon_slack_length=0.005286365 pennation_angle_at_optimal=0 activation1=0 activation2=0
      PathPoint P1: tibia_r (0.0301535 -0.0619184 0.00609486)
      PathPoint P2: patella_r (0.0021 0.0015 0.0001)
    Schutte1993Muscle_Deprecated pect_r: max_isometric_force=177 optimal_fiber_length=0.1330119
        tendon_slack_length=0.001000089 pennation_angle_at_optimal=0
      PathPoint P1: pelvis (-0.0288789 -0.08325 0.0419934)
      PathPoint P2: femur_r (-0.00738577 -0.0798055 0.0222685)
      PathWrap: wrap_object=PECT_at_femshaft_r method=hybrid
    Schutte1993Muscle_Deprecated perbrev_r: max_isometric_force=305.9 optimal_fiber_length=0.0477559
        tendon_slack_length=0.1557852 pennation_angle_at_optimal=0.2007129
      PathPoint P1: tibia_r (-0.0259833 -0.270773 0.0268388)
      PathPoint P2: tibia_r (-0.0362484 -0.416318 0.0266249)
      PathPoint P3: tibia_r (-0.0304743 -0.428189 0.0272665)
      PathPoint P4: calcn_r (0.046098 0.0264256 0.0228043)
      PathPoint P5: calcn_r (0.0662597 0.0214341 0.0335703)
    Schutte1993Muscle_Deprecated perlong_r: max_isometric_force=653.3 optimal_fiber_length=0.05293344
        tendon_slack_length=0.3469849 pennation_angle_at_optimal=0.2460914
      PathPoint P1: tibia_r (-0.0213855 -0.146829 0.0301535)
      PathPoint P2: tibia_r (-0.033896 -0.417067 0.0253418)
      PathPoint P3: tibia_r (-0.0290842 -0.429258 0.0256626)
      PathPoint P4: calcn_r (0.0428682 0.0225107 0.0216298)
      PathPoint P5: calcn_r (0.0666512 0.0103745 0.0277958)
      PathPoint P6: calcn_r (0.0833874 0.0067532 0.011549)
      PathPoint P7: calcn_r (0.117741 0.00831916 -0.0180085)
    Schutte1993Muscle_Deprecated pertert_r: max_isometric_force=90 optimal_fiber_length=0.08281306
        tendon_slack_length=0.1048267 pennation_angle_at_optimal=0.2268928
      PathPoint P1: tibia_r (-0.0159322 -0.265746 0.0237379)
      PathPoint P2: tibia_r (0.0115482 -0.408511 0.0240587)
      PathPoint P3: calcn_r (0.0838767 0.0223149 0.0292639)
    Schutte1993Muscle_Deprecated piri_r: max_isometric_force=296 optimal_fiber_length=0.02625274
        tendon_slack_length=0.1161179 pennation_angle_at_optimal=0.1745329
      PathPoint P1: pelvis (-0.126731 -0.00653 0.0125266)
      PathPoint P2: pelvis (-0.126992 -0.03066 0.0564857)
      PathPoint P3: femur_r (-0.0137151 -0.00337286 0.0404967)
    Schutte1993Muscle_Deprecated psoas_r: max_isometric_force=479.7 optimal_fiber_length=0.119711
        tendon_slack_length=0.09933247 pennation_angle_at_optimal=0.1867502
      PathPoint P1: pelvis (-0.0754336 0.062 0.0361612)
      PathPoint P2: pelvis (-0.025518 -0.0654 0.060825)
      PathPoint P3: femur_r (-0.0122324 -0.0437534 0.00426281)
      PathPoint P4: femur_r (-0.0217774 -0.0490938 0.00815493)
      PathWrap: wrap_object=PS_at_brim_r method=hybrid range=(2 3)
    Schutte1993Muscle_Deprecated quadfem_r: max_isometric_force=254 optimal_fiber_length=0.05951454
        tendon_slack_length=0.02645091 pennation_angle_at_optimal=0
      PathPoint P1: pelvis (-0.139316 -0.11473 0.0478997)
      PathPoint P2: femur_r (-0.0331294 -0.0332789 0.0334723)
    Schutte1993Muscle_Deprecated recfem_r: max_isometric_force=848.8 optimal_fiber_length=0.07089977
        tendon_slack_length=0.3232058 pennation_angle_at_optimal=0.2426008
      PathPoint P1: pelvis (-0.0298747 -0.0388 0.0865086)
      PathPoint P2: patella_r (0.01 0.049 0.0007)
      PathPoint P3: patella_r (0.0121 0.0437 -0.001)
      PathWrap: wrap_object=KnExt_at_fem_r method=hybrid
    Schutte1993Muscle_Deprecated sart_r: max_isometric_force=113.5 optimal_fiber_length=0.39013
        tendon_slack_length=0.1064871 pennation_angle_at_optimal=0.02268928
      PathPoint P1: pelvis (-0.0242732 -0.0156 0.0979133)
      PathPoint P2: femur_r (-0.00278009 -0.334287 -0.0390139)
      PathPoint P3: tibia_r (-0.0268388 -0.0428831 -0.0390285)
      PathPoint P4: tibia_r (-0.0170014 -0.0640572 -0.0282288)
      PathPoint P5: tibia_r (0.0145421 -0.0866215 -0.00278011)
    Schutte1993Muscle_Deprecated semimem_r: max_isometric_force=1162.7 optimal_fiber_length=0.06522445
        tendon_slack_length=0.3289581 pennation_angle_at_optimal=0.2635447
      PathPoint P1: pelvis (-0.12286 -0.114 0.0569307)
      PathPoint P2: tibia_r (-0.0310089 -0.0445941 -0.0209578)
      PathWrap: wrap_object=SM_at_condyles_r method=hybrid
    Schutte1993Muscle_Deprecated semiten_r: max_isometric_force=301.9 optimal_fiber_length=0.185096
        tendon_slack_length=0.2349664 pennation_angle_at_optimal=0.2251475
      PathPoint P1: pelvis (-0.129208 -0.1253 0.0477514)
      PathPoint P2: tibia_r (-0.0333613 -0.0543256 -0.0244864)
      PathPoint P3: tibia_r (0.00203162 -0.0826648 -0.0125105)
      PathWrap: wrap_object=ST_at_condyles_r method=hybrid
    Schutte1993Muscle_Deprecated soleus_r: max_isometric_force=3585.9 optimal_fiber_length=0.04684997
        tendon_slack_length=0.2997334 pennation_angle_at_optimal=0.4939282
      PathPoint P1: tibia_r (-0.00812648 -0.0979572 0.0104789)
      PathPoint P2: calcn_r (0.00430639 0.0303405 -0.00518724)
    Schutte1993Muscle_Deprecated tfl_r: max_isometric_force=155 optimal_fiber_length=0.0908728
        tendon_slack_length=0.4304501 pennation_angle_at_optimal=0.05235988
      PathPoint P1: pelvis (-0.0387126 0.0214 0.115067)
      PathPoint P2: femur_r (0.0272449 -0.0932221 0.0553238)
      PathPoint P3: femur_r (0.00991566 -0.379446 0.030025)
      PathPoint P4: tibia_r (0.0115482 -0.0438455 0.0369969)
    Schutte1993Muscle_Deprecated tibant_r: max_isometric_force=673.7 optimal_fiber_length=0.0719076
        tendon_slack_length=0.2537296 pennation_angle_at_optimal=0.1675516
      PathPoint P1: tibia_r (0.0164668 -0.140306 0.0173222)
      PathPoint P2: tibia_r (0.0268388 -0.203829 0.0136867)
      PathPoint P3: tibia_r (0.0249141 -0.391294 -0.0141144)
      PathPoint P4: calcn_r (0.114119 0.0174213 -0.0298511)
    Schutte1993Muscle_Deprecated tibpost_r: max_isometric_force=905.6 optimal_fiber_length=0.03990025
        tendon_slack_length=0.2974574 pennation_angle_at_optimal=0.2391101
      PathPoint P1: tibia_r (-0.00438402 -0.13945 0.0110135)
      PathPoint P2: tibia_r (-0.0175361 -0.390866 -0.0187123)
      PathPoint P3: calcn_r (0.0408128 0.0326894 -0.0279915)
      PathPoint P4: calcn_r (0.0755576 0.0155617 -0.0275022)
    Schutte1993Muscle_Deprecated vasint_r: max_isometric_force=1024.2 optimal_fiber_length=0.0914024
        tendon_slack_length=0.09756954 pennation_angle_at_optimal=0.07853982
      PathPoint P1: femur_r (0.0268742 -0.180261 0.0287276)
      PathPoint P2: femur_r (0.0310443 -0.195251 0.0264109)
      PathPoint P3: patella_r (0.0058 0.048 -0.0006)
      PathWrap: wrap_object=KnExt_at_fem_r method=hybrid
    Schutte1993Muscle_Deprecated vaslat_r: max_isometric_force=2255.4 optimal_fiber_length=0.09175294
        tendon_slack_length=0.1199988 pennation_angle_at_optimal=0.3211406
      PathPoint P1: femur_r (0.00444815 -0.173703 0.0323417)
      PathPoint P2: femur_r (0.0249281 -0.242752 0.0379019)
      PathPoint P3: patella_r (0.0103 0.0423 0.0141)
      PathWrap: wrap_object=KnExt_at_fem_r method=hybrid
    Schutte1993Muscle_Deprecated vasmed_r: max_isometric_force=1443.7 optimal_fiber_length=0.08924128
        tendon_slack_length=0.1032544 pennation_angle_at_optimal=0.5166175
      PathPoint P1: femur_r (0.0129738 -0.196657 0.0174219)
      PathPoint P2: femur_r (0.0329904 -0.259429 0.000834027)
      PathPoint P3: patella_r (0.0063 0.0445 -0.017)
      PathWrap: wrap_object=KnExt_at_fem_r method=hybrid
    Schutte1993Muscle_Deprecated addbrev_l: max_isometric_force=303.7 optimal_fiber_length=0.1010662
        tendon_slack_length=0.03528985 pennation_angle_at_optimal=0.1064651
      PathPoint P1: pelvis (-0.0237753 -0.094 -0.014279)
      PathPoint P2: femur_l (-0.00185339 -0.110736 -0.0230748)
      PathWrap: wrap_object=AB_at_femshaft_l method=hybrid
    Schutte1993Muscle_Deprecated addlong_l: max_isometric_force=399.5 optimal_fiber_length=0.1032898
        tendon_slack_length=0.1241005 pennation_angle_at_optimal=0.1239184
      PathPoint P1: pelvis (-0.00943543 -0.0889 -0.0175058)
      PathPoint P2: femur_l (0.0104346 -0.224634 -0.0146696)
      PathWrap: wrap_object=AL_at_femshaft_l method=hybrid
    Schutte1993Muscle_Deprecated addmagDist_l: max_isometric_force=324.2 optimal_fiber_length=0.1655701
        tendon_slack_length=0.08409314 pennation_angle_at_optimal=0.2408554
      PathPoint P1: pelvis (-0.0921635 -0.12767 -0.0369215)
      PathPoint P2: femur_l (0.0104253 -0.246341 -0.0178853)
      PathWrap: wrap_object=AMdist_at_femshaft_l method=hybrid
    Schutte1993Muscle_Deprecated addmagIsch_l: max_isometric_force=324.2 optimal_fiber_length=0.1445081
        tendon_slack_length=0.2044577 pennation_angle_at_optimal=0.2076942
      PathPoint P1: pelvis (-0.111557 -0.12976 -0.0386739)
      PathPoint P2: femur_l (0.00445741 -0.364088 0.0303308)
      PathWrap: wrap_object=AMisch_at_condyles_l method=hybrid
    Schutte1993Muscle_Deprecated addmagMid_l: max_isometric_force=324.2 optimal_fiber_length=0.1297889
        tendon_slack_length=0.04524234 pennation_angle_at_optimal=0.2565634
      PathPoint P1: pelvis (-0.0655501 -0.12075 -0.0264626)
      PathPoint P2: femur_l (0.00224261 -0.152403 -0.0270781)
      PathWrap: wrap_object=AMmid_at_femshaft_l method=hybrid
    Schutte1993Muscle_Deprecated addmagProx_l: max_isometric_force=324.2 optimal_fiber_length=0.102318
        tendon_slack_length=0.04166356 pennation_angle_at_optimal=0.3874631
      PathPoint P1: pelvis (-0.0385633 -0.10755 -0.0126564)
      PathPoint P2: femur_l (-0.0141507 -0.0740055 -0.0296728)
      PathWrap: wrap_object=AMprox_at_femshaft_l method=hybrid
    Schutte1993Muscle_Deprecated bflh_l: max_isometric_force=705.2 optimal_fiber_length=0.0926992
        tendon_slack_length=0.3058314 pennation_angle_at_optimal=0.2024582
      PathPoint P1: pelvis (-0.129457 -0.1191 -0.0543345)
      PathPoint P2: tibia_l (-0.033896 -0.0454618 -0.0356068)
      PathWrap: wrap_object=BFLH_at_gastroc_l method=hybrid
    Schutte1993Muscle_Deprecated bfsh_l: max_isometric_force=315.8 optimal_fiber_length=0.1062556
        tendon_slack_length=0.1001866 pennation_angle_at_optimal=0.2146755
      PathPoint P1: femur_l (0.00463348 -0.198105 -0.0216847)
      PathPoint P2: tibia_l (-0.0321851 -0.0448201 -0.0340029)
      PathWrap: wrap_object=BFLH_at_gastroc_l method=hybrid
    Schutte1993Muscle_Deprecated edl_l: max_isometric_force=345.4 optimal_fiber_length=0.07179837
        tendon_slack_length=0.3805417 pennation_angle_at_optimal=0.1884956
      PathPoint P1: tibia_l (-0.0171084 -0.123763 -0.0219201)
      PathPoint P2: tibia_l (0.0175361 -0.402204 -0.0119759)
      PathPoint P3: calcn_l (0.0899448 0.0352341 -0.00078298)
      PathPoint P4: calcn_l (0.158162 0.00538299 -0.0127234)
      PathPoint P5: toes_l (0.000293618 0.00460001 -0.0149745)
      PathPoint P6: toes_l (0.0433575 -0.00039149 -0.0244681)
    Schutte1993Muscle_Deprecated ehl_l: max_isometric_force=165 optimal_fiber_length=0.07716636
        tendon_slack_length=0.3419873 pennation_angle_at_optimal=0.164061
      PathPoint P1: tibia_l (-0.0149698 -0.165802 -0.0202093)
      PathPoint P2: tibia_l (0.00759184 -0.311173 -0.0175361)
      PathPoint P3: tibia_l (0.0213855 -0.395037 0.00299397)
      PathPoint P4: calcn_l (0.0949363 0.0380724 0.0206511)
      PathPoint P5: calcn_l (0.126549 0.0302426 0.0251532)
      PathPoint P6: calcn_l (0.169711 0.0136043 0.0274043)
      PathPoint P7: toes_l (0.029166 0.00401277 0.0239788)
      PathPoint P8: toes_l (0.0551022 0.00332767 0.0182043)
    Schutte1993Muscle_Deprecated fdl_l: max_isometric_force=274.4 optimal_fiber_length=0.04574306
        tendon_slack_length=0.3873801 pennation_angle_at_optimal=0.2373648
      PathPoint P1: tibia_l (-0.00245933 -0.195967 0.00192469)
      PathPoint P2: tibia_l (-0.0188192 -0.389902 0.013259)
      PathPoint P3: calcn_l (0.0426724 0.0308298 0.0274043)
      PathPoint P4: calcn_l (0.0692937 0.0172256 0.0257405)
      PathPoint P5: calcn_l (0.162273 -0.00792767 -0.0113532)
      PathPoint P6: toes_l (-0.00185958 -0.00763406 -0.0143873)
      PathPoint P7: toes_l (0.0278937 -0.00694895 -0.0210426)
      PathPoint P8: toes_l (0.0431618 -0.00587235 -0.0236851)
    Schutte1993Muscle_Deprecated fhl_l: max_isometric_force=436.8 optimal_fiber_length=0.05380815
        tendon_slack_length=0.3634858 pennation_angle_at_optimal=0.2949606
      PathPoint P1: tibia_l (-0.0331475 -0.231374 -0.0213855)
      PathPoint P2: tibia_l (-0.0258764 -0.392683 0.00812648)
      PathPoint P3: calcn_l (0.0366043 0.0270128 0.0235873)
      PathPoint P4: calcn_l (0.101592 0.00665533 0.0250554)
      PathPoint P5: calcn_l (0.168928 -0.00518724 0.0263277)
      PathPoint P6: toes_l (0.0151702 -0.00626384 0.0259362)
      PathPoint P7: toes_l (0.0550044 -0.009983 0.0177149)
    Schutte1993Muscle_Deprecated gaslat_l: max_isometric_force=606.4 optimal_fiber_length=0.0624389
        tendon_slack_length=0.4056405 pennation_angle_at_optimal=0.2094395
      PathPoint P1: femur_l (-0.00278009 -0.357922 -0.0256695)
      PathPoint P2: calcn_l (0.00430639 0.0303405 0.00518724)
      PathWrap: wrap_object=Gastroc_at_shank_l method=hybrid
      PathWrap: wrap_object=Gastroc_at_condyles_l method=hybrid
    Schutte1993Muscle_Deprecated gasmed_l: max_isometric_force=1308 optimal_fiber_length=0.05401453
        tendon_slack_length=0.4244906 pennation_angle_at_optimal=0.1727876
      PathPoint P1: femur_l (0.00741358 -0.355482 0.0192753)
      PathPoint P2: calcn_l (0.00430639 0.0303405 0.00518724)
      PathWrap: wrap_object=Gastroc_at_shank_l method=hybrid
      PathWrap: wrap_object=Gastroc_at_condyles_l method=hybrid
    Schutte1993Muscle_Deprecated gem_l: max_isometric_force=109 optimal_fiber_length=0.02693277
        tendon_slack_length=0.04376575 pennation_angle_at_optimal=0
      PathPoint P1: pelvis (-0.128922 -0.0764 -0.062188)
      PathPoint P2: femur_l (-0.0131591 -0.00309686 -0.0410527)
    Schutte1993Muscle_Deprecated glmax1_l: max_isometric_force=546.1 optimal_fiber_length=0.1500616
        tendon_slack_length=0.05093741 pennation_angle_at_optimal=0.3822271
      PathPoint P1: pelvis (-0.153232 0.0345 -0.052202)
      PathPoint P2: pelvis (-0.156469 -0.0242 -0.0722297)
      PathPoint P3: femur_l (-0.0411453 -0.0305932 -0.0279862)
      PathPoint P4: femur_l (-0.0256695 -0.0531158 -0.0435548)
      PathWrap: wrap_object=Gmax_at_pelvis_l method=hybrid
    Schutte1993Muscle_Deprecated glmax2_l: max_isometric_force=780.5 optimal_fiber_length=0.1590473
        tendon_slack_length=0.07430317 pennation_angle_at_optimal=0.3822271
      PathPoint P1: pelvis (-0.163937 0.0087 -0.0428371)
      PathPoint P2: pelvis (-0.167298 -0.0609 -0.0753822)
      PathPoint P3: femur_l (-0.0417014 -0.054805 -0.0233528)
      PathPoint P4: femur_l (-0.0144565 -0.0953457 -0.0388286)
      PathWrap: wrap_object=Gmax_at_pelvis_l method=hybrid
    Schutte1993Muscle_Deprecated glmax3_l: max_isometric_force=526.1 optimal_fiber_length=0.1691127
        tendon_slack_length=0.07130158 pennation_angle_at_optimal=0.3822271
      PathPoint P1: pelvis (-0.161821 -0.0525 -0.0083449)
      PathPoint P2: pelvis (-0.15846 -0.1263 -0.0403337)
      PathPoint P3: femur_l (-0.0260402 -0.105574 -0.00871095)
      PathPoint P4: femur_l (-0.00556018 -0.133165 -0.0380872)
      PathWrap: wrap_object=Gmax_at_pelvis_l method=hybrid
    Schutte1993Muscle_Deprecated glmed1_l: max_isometric_force=881.1 optimal_fiber_length=0.07210996
        tendon_slack_length=0.05558271 pennation_angle_at_optimal=0.3577925
      PathPoint P1: pelvis (-0.0553927 0.0245 -0.108669)
      PathPoint P2: femur_l (-0.020202 -0.0109798 -0.0514317)
    Schutte1993Muscle_Deprecated glmed2_l: max_isometric_force=616.5 optimal_fiber_length=0.07333905
        tendon_slack_length=0.06603516 pennation_angle_at_optimal=0.3577925
      PathPoint P1: pelvis (-0.105806 0.0316 -0.0625867)
      PathPoint P2: femur_l (-0.0239088 -0.00544296 -0.0488369)
    Schutte1993Muscle_Deprecated glmed3_l: max_isometric_force=702 optimal_fiber_length=0.07636068
        tendon_slack_length=0.04792075 pennation_angle_at_optimal=0.3577925
      PathPoint P1: pelvis (-0.143399 -0.0073 -0.0487713)
      PathPoint P2: femur_l (-0.0286349 -0.00441068 -0.0480029)
    Schutte1993Muscle_Deprecated glmin1_l: max_isometric_force=180 optimal_fiber_length=0.06672558
        tendon_slack_length=0.01570014 pennation_angle_at_optimal=0.1745329
      PathPoint P1: pelvis (-0.0577578 -0.0149 -0.096615)
      PathPoint P2: femur_l (-0.00667222 -0.0097598 -0.051895)
    Schutte1993Muscle_Deprecated glmin2_l: max_isometric_force=190 optimal_fiber_length=0.0549943
        tendon_slack_length=0.02553307 pennation_angle_at_optimal=0
      PathPoint P1: pelvis (-0.0766784 -0.0142 -0.090032)
      PathPoint P2: femur_l (-0.00889629 -0.0097598 -0.051895)
    Schutte1993Muscle_Deprecated glmin3_l: max_isometric_force=215 optimal_fiber_length=0.03817634
        tendon_slack_length=0.05123666 pennation_angle_at_optimal=0.01745329
      PathPoint P1: pelvis (-0.0982131 -0.0155 -0.0739914)
      PathPoint P2: femur_l (-0.0125104 -0.00778906 -0.0509683)
    Schutte1993Muscle_Deprecated grac_l: max_isometric_force=137.3 optimal_fiber_length=0.2182147
        tendon_slack_length=0.1590151 pennation_angle_at_optimal=0.143117
      PathPoint P1: pelvis (-0.0589527 -0.12932 -0.0227723)
      PathPoint P2: tibia_l (-0.019696 -0.0508637 0.0316612)
      PathPoint P3: tibia_l (0.00190331 -0.0744719 0.0168197)
      PathWrap: wrap_object=GR_at_condyles_l method=hybrid
    Schutte1993Muscle_Deprecated iliacus_l: max_isometric_force=621.9 optimal_fiber_length=0.1111859
        tendon_slack_length=0.09804385 pennation_angle_at_optimal=0.2495821
      PathPoint P1: pelvis (-0.0753091 0.0309 -0.0781638)
      PathPoint P2: pelvis (-0.0168045 -0.0557 -0.0700972)
      PathPoint P3: femur_l (-0.0021314 -0.053022 -0.0128811)
      PathPoint P4: femur_l (-0.0113057 -0.0597788 -0.0181633)
      PathWrap: wrap_object=IL_at_brim_l method=hybrid range=(2 3)
    Schutte1993Muscle_Deprecated patlig_l: max_isometric_force=1 optimal_fiber_length=0.05296612
        tendon_slack_length=0.005296612 pennation_angle_at_optimal=0 activation1=0 activation2=0
      PathPoint P1: tibia_l (0.0301535 -0.0619351 -0.00609486)
      PathPoint P2: patella_l (0.0021 0.0015 -0.0001)
    Schutte1993Muscle_Deprecated pect_l: max_isometric_force=177 optimal_fiber_length=0.133032
        tendon_slack_length=0.001000241 pennation_angle_at_optimal=0
      PathPoint P1: pelvis (-0.0288789 -0.08325 -0.0419934)
      PathPoint P2: femur_l (-0.00738577 -0.0799364 -0.0222685)
      PathWrap: wrap_object=PECT_at_femshaft_l method=hybrid
    Schutte1993Muscle_Deprecated perbrev_l: max_isometric_force=305.9 optimal_fiber_length=0.0477957
        tendon_slack_length=0.1559151 pennation_angle_at_optimal=0.2007129
      PathPoint P1: tibia_l (-0.0259833 -0.270846 -0.0268388)
      PathPoint P2: tibia_l (-0.0362484 -0.41643 -0.0266249)
      PathPoint P3: tibia_l (-0.0304743 -0.428304 -0.0272665)
      PathPoint P4: calcn_l (0.046098 0.0264256 -0.0228043)
      PathPoint P5: calcn_l (0.0662597 0.0214341 -0.0335703)
    Schutte1993Muscle_Deprecated perlong_l: max_isometric_force=653.3 optimal_fiber_length=0.05296453
        tendon_slack_length=0.3471887 pennation_angle_at_optimal=0.2460914
      PathPoint P1: tibia_l (-0.0213855 -0.146868 -0.0301535)
      PathPoint P2: tibia_l (-0.033896 -0.41718 -0.0253418)
      PathPoint P3: tibia_l (-0.0290842 -0.429374 -0.0256626)
      PathPoint P4: calcn_l (0.0428682 0.0225107 -0.0216298)
      PathPoint P5: calcn_l (0.0666512 0.0103745 -0.0277958)
      PathPoint P6: calcn_l (0.0833874 0.0067532 -0.011549)
      PathPoint P7: calcn_l (0.117741 0.00831916 0.0180085)
    Schutte1993Muscle_Deprecated pertert_l: max_isometric_force=90 optimal_fiber_length=0.08291194
        tendon_slack_length=0.1049518 pennation_angle_at_optimal=0.2268928
      PathPoint P1: tibia_l (-0.0159322 -0.265818 -0.0237379)
      PathPoint P2: tibia_l (0.0115482 -0.408621 -0.0240587)
      PathPoint P3: calcn_l (0.0838767 0.0223149 -0.0292639)
    Schutte1993Muscle_Deprecated piri_l: max_isometric_force=296 optimal_fiber_length=0.02625271
        tendon_slack_length=0.1161178 pennation_angle_at_optimal=0.1745329
      PathPoint P1: pelvis (-0.126731 -0.00653 -0.0125266)
      PathPoint P2: pelvis (-0.126992 -0.03066 -0.0564857)
      PathPoint P3: femur_l (-0.0137151 -0.00337839 -0.0404967)
    Schutte1993Muscle_Deprecated psoas_l: max_isometric_force=479.7 optimal_fiber_length=0.1197346
        tendon_slack_length=0.09935207 pennation_angle_at_optimal=0.1867502
      PathPoint P1: pelvis (-0.0754336 0.062 -0.0361612)
      PathPoint P2: pelvis (-0.025518 -0.0654 -0.060825)
      PathPoint P3: femur_l (-0.0122324 -0.0438252 -0.00426281)
      PathPoint P4: femur_l (-0.0217774 -0.0491743 -0.00815493)
      PathWrap: wrap_object=PS_at_brim_l method=hybrid range=(2 3)
    Schutte1993Muscle_Deprecated quadfem_l: max_isometric_force=254 optimal_fiber_length=0.0595171
        tendon_slack_length=0.02645204 pennation_angle_at_optimal=0
      PathPoint P1: pelvis (-0.139316 -0.11473 -0.0478997)
      PathPoint P2: femur_l (-0.0331294 -0.0333335 -0.0334723)
    Schutte1993Muscle_Deprecated recfem_l: max_isometric_force=848.8 optimal_fiber_length=0.0710182
        tendon_slack_length=0.3237457 pennation_angle_at_optimal=0.2426008
      PathPoint P1: pelvis (-0.0298747 -0.0388 -0.0865086)
      PathPoint P2: patella_l (0.01 0.049 -0.0007)
      PathPoint P3: patella_l (0.0121 0.0437 0.001)
      PathWrap: wrap_object=KnExt_at_fem_l method=hybrid
    Schutte1993Muscle_Deprecated sart_l: max_isometric_force=113.5 optimal_fiber_length=0.3906023
        tendon_slack_length=0.106616 pennation_angle_at_optimal=0.02268928
      PathPoint P1: pelvis (-0.0242732 -0.0156 -0.0979133)
      PathPoint P2: femur_l (-0.00278009 -0.334836 0.0390139)
      PathPoint P3: tibia_l (-0.0268388 -0.0428946 0.0390285)
      PathPoint P4: tibia_l (-0.0170014 -0.0640745 0.0282288)
      PathPoint P5: tibia_l (0.0145421 -0.0866449 0.00278011)
    Schutte1993Muscle_Deprecated semimem_l: max_isometric_force=1162.7 optimal_fiber_length=0.06533339
        tendon_slack_length=0.3295075 pennation_angle_at_optimal=0.2635447
      PathPoint P1: pelvis (-0.12286 -0.114 -0.0569307)
      PathPoint P2: tibia_l (-0.0310089 -0.0446061 0.0209578)
      PathWrap: wrap_object=SM_at_condyles_l method=hybrid
    Schutte1993Muscle_Deprecated semiten_l: max_isometric_force=301.9 optimal_fiber_length=0.1853784
        tendon_slack_length=0.2353249 pennation_angle_at_optimal=0.2251475
      PathPoint P1: pelvis (-0.129208 -0.1253 -0.0477514)
      PathPoint P2: tibia_l (-0.0333613 -0.0543403 0.0244864)
      PathPoint P3: tibia_l (0.00203162 -0.0826871 0.0125105)
      PathWrap: wrap_object=ST_at_condyles_l method=hybrid
    Schutte1993Muscle_Deprecated soleus_l: max_isometric_force=3585.9 optimal_fiber_length=0.04688945
        tendon_slack_length=0.2999859 pennation_angle_at_optimal=0.4939282
      PathPoint P1: tibia_l (-0.00812648 -0.0979836 -0.0104789)
      PathPoint P2: calcn_l (0.00430639 0.0303405 0.00518724)
    Schutte1993Muscle_Deprecated tfl_l: max_isometric_force=155 optimal_fiber_length=0.09098494
        tendon_slack_length=0.4309813 pennation_angle_at_optimal=0.05235988
      PathPoint P1: pelvis (-0.0387126 0.0214 -0.115067)
      PathPoint P2: femur_l (0.0272449 -0.093375 -0.0553238)
      PathPoint P3: femur_l (0.00991566 -0.380069 -0.030025)
      PathPoint P4: tibia_l (0.0115482 -0.0438573 -0.0369969)
    Schutte1993Muscle_Deprecated tibant_l: max_isometric_force=673.7 optimal_fiber_length=0.07196484
        tendon_slack_length=0.2539316 pennation_angle_at_optimal=0.1675516
      PathPoint P1: tibia_l (0.0164668 -0.140344 -0.0173222)
      PathPoint P2: tibia_l (0.0268388 -0.203884 -0.0136867)
      PathPoint P3: tibia_l (0.0249141 -0.3914 0.0141144)
      PathPoint P4: calcn_l (0.114119 0.0174213 0.0298511)
    Schutte1993Muscle_Deprecated tibpost_l: max_isometric_force=905.6 optimal_fiber_length=0.03993345
        tendon_slack_length=0.297705 pennation_angle_at_optimal=0.2391101
      PathPoint P1: tibia_l (-0.00438402 -0.139487 -0.0110135)
      PathPoint P2: tibia_l (-0.0175361 -0.390972 0.0187123)
      PathPoint P3: calcn_l (0.0408128 0.0326894 0.0279915)
      PathPoint P4: calcn_l (0.0755576 0.0155617 0.0275022)
    Schutte1993Muscle_Deprecated vasint_l: max_isometric_force=1024.2 optimal_fiber_length=0.09158727
        tendon_slack_length=0.09776687 pennation_angle_at_optimal=0.07853982
      PathPoint P1: femur_l (0.0268742 -0.180557 -0.0287276)
      PathPoint P2: femur_l (0.0310443 -0.195572 -0.0264109)
      PathPoint P3: patella_l (0.0058 0.048 0.0006)
      PathWrap: wrap_object=KnExt_at_fem_l method=hybrid
    Schutte1993Muscle_Deprecated vaslat_l: max_isometric_force=2255.4 optimal_fiber_length=0.09192196
        tendon_slack_length=0.1202199 pennation_angle_at_optimal=0.3211406
      PathPoint P1: femur_l (0.00444815 -0.173988 -0.0323417)
      PathPoint P2: femur_l (0.0249281 -0.24315 -0.0379019)
      PathPoint P3: patella_l (0.0103 0.0423 -0.0141)
      PathWrap: wrap_object=KnExt_at_fem_l method=hybrid
    Schutte1993Muscle_Deprecated vasmed_l: max_isometric_force=1443.7 optimal_fiber_length=0.0894129
        tendon_slack_length=0.1034529 pennation_angle_at_optimal=0.5166175
      PathPoint P1: femur_l (0.0129738 -0.196979 -0.0174219)
      PathPoint P2: femur_l (0.0329904 -0.259854 -0.000834027)
      PathPoint P3: patella_l (0.0063 0.0445 0.017)
      PathWrap: wrap_object=KnExt_at_fem_l method=hybrid
    Thelen2003Muscle [values shared by the 6 below unless stated]: min_control=0.01 max_control=1
        pennation_angle_at_optimal=0 [radians] activation_time_constant=0.01 deactivation_time_constant=0.04
        FmaxTendonStrain=0.033 FmaxMuscleStrain=0.6 KshapeActive=0.5 KshapePassive=4 Af=0.3 Flen=1.8
    Thelen2003Muscle ercspn_r: max_isometric_force=2500 optimal_fiber_length=0.1214059 tendon_slack_length=0.03035147
      PathPoint P1: pelvis (-0.162459 0.0217669 0.0262854)
      PathPoint P2: torso (-0.0578839 0.112675 0.0261611)
    Thelen2003Muscle ercspn_l: max_isometric_force=2500 optimal_fiber_length=0.1214059 tendon_slack_length=0.03035147
      PathPoint P1: pelvis (-0.162459 0.0217669 -0.0262854)
      PathPoint P2: torso (-0.0578839 0.112675 -0.0261611)
    Thelen2003Muscle intobl_r: max_isometric_force=900 optimal_fiber_length=0.09924944 tendon_slack_length=0.1061969
      PathPoint P1: pelvis (-0.0544209 0.0626553 0.107813)
      PathPoint P2: torso (0.0736704 0.163891 0.0162828)
    Thelen2003Muscle intobl_l: max_isometric_force=900 optimal_fiber_length=0.09924944 tendon_slack_length=0.09924944
      PathPoint P1: pelvis (-0.0544209 0.0626553 -0.107813)
      PathPoint P2: torso (0.0736704 0.163891 -0.0162828)
    Thelen2003Muscle extobl_r: max_isometric_force=900 optimal_fiber_length=0.1238667 tendon_slack_length=0.14864
      PathPoint P1: pelvis (-0.00801053 -0.0660526 0.00947717)
      PathPoint P2: torso (0.0684082 0.112675 0.119407)
    Thelen2003Muscle extobl_l: max_isometric_force=900 optimal_fiber_length=0.1238667 tendon_slack_length=0.1445111
      PathPoint P1: pelvis (-0.00801053 -0.0660526 -0.00947717)
      PathPoint P2: torso (0.0684082 0.112675 -0.119407)
    ObjectGroup right_leg: members=(addbrev_r addlong_r addmagDist_r addmagIsch_r addmagMid_r addmagProx_r bflh_r bfsh_r edl_r ehl_r fdl_r fhl_r gaslat_r gasmed_r gem_r glmax1_r glmax2_r glmax3_r glmed1_r glmed2_r glmed3_r glmin1_r glmin2_r glmin3_r grac_r iliacus_r patlig_r pect_r perbrev_r perlong_r pertert_r piri_r psoas_r quadfem_r recfem_r sart_r semimem_r semiten_r soleus_r tfl_r tibant_r tibpost_r vasint_r vaslat_r vasmed_r)
    ObjectGroup left_leg: members=(addbrev_l addlong_l addmagDist_l addmagIsch_l addmagMid_l addmagProx_l bflh_l bfsh_l edl_l ehl_l fdl_l fhl_l gaslat_l gasmed_l gem_l glmax1_l glmax2_l glmax3_l glmed1_l glmed2_l glmed3_l glmin1_l glmin2_l glmin3_l grac_l iliacus_l patlig_l pect_l perbrev_l perlong_l pertert_l piri_l psoas_l quadfem_l recfem_l sart_l semimem_l semiten_l soleus_l tfl_l tibant_l tibpost_l vasint_l vaslat_l vasmed_l)
    ObjectGroup hip_add_r: members=(addbrev_r addlong_r addmagDist_r addmagIsch_r addmagMid_r addmagProx_r bflh_r grac_r pect_r semimem_r semiten_r)
    ObjectGroup hip_abd_r: members=(glmax1_r glmed1_r glmed2_r glmed3_r glmin1_r glmin2_r glmin3_r piri_r sart_r tfl_r)
    ObjectGroup hip_flex_r: members=(addbrev_r addlong_r glmin1_r grac_r iliacus_r pect_r psoas_r recfem_r sart_r tfl_r)
    ObjectGroup hip_ext_r: members=(addlong_r addmagDist_r addmagIsch_r addmagMid_r addmagProx_r bflh_r glmax1_r glmax2_r glmax3_r glmed1_r glmed2_r glmed3_r glmin3_r semimem_r semiten_r)
    ObjectGroup hip_inrot_r: members=(glmed1_r glmed2_r glmed3_r glmin1_r iliacus_r psoas_r tfl_r)
    ObjectGroup hip_exrot_r: members=(gem_r glmin3_r piri_r quadfem_r)
    ObjectGroup knee_flex_r: members=(bflh_r bfsh_r gaslat_r gasmed_r grac_r sart_r semimem_r semiten_r)
    ObjectGroup knee_ext_r: members=(patlig_r recfem_r vasint_r vaslat_r vasmed_r)
    ObjectGroup ankle_df_r: members=(edl_r ehl_r pertert_r tibant_r)
    ObjectGroup ankle_pf_r: members=(fdl_r fhl_r gaslat_r gasmed_r perbrev_r perlong_r soleus_r tibpost_r)
    ObjectGroup everter_r: members=(edl_r perbrev_r perlong_r pertert_r)
    ObjectGroup inverter_r: members=(ehl_r fdl_r fhl_r tibant_r tibpost_r)
    ObjectGroup hip_add_l: members=(addbrev_l addlong_l addmagDist_l addmagIsch_l addmagMid_l addmagProx_l bflh_l grac_l pect_l semimem_l semiten_l)
    ObjectGroup hip_abd_l: members=(glmax1_l glmed1_l glmed2_l glmed3_l glmin1_l glmin2_l glmin3_l piri_l sart_l tfl_l)
    ObjectGroup hip_flex_l: members=(addbrev_l addlong_l glmin1_l grac_l iliacus_l pect_l psoas_l recfem_l sart_l tfl_l)
    ObjectGroup hip_ext_l: members=(addlong_l addmagDist_l addmagIsch_l addmagMid_l addmagProx_l bflh_l glmax1_l glmax2_l glmax3_l glmed1_l glmed2_l glmed3_l glmin3_l semimem_l semiten_l)
    ObjectGroup hip_exrot_l: members=(gem_l glmin3_l piri_l quadfem_l)
    ObjectGroup hip_inrot_l: members=(glmed1_l glmed2_l glmed3_l glmin1_l iliacus_l psoas_l tfl_l)
    ObjectGroup knee_flex_l: members=(bflh_l bfsh_l gaslat_l gasmed_l grac_l sart_l semimem_l semiten_l)
    ObjectGroup knee_ext_l: members=(patlig_l recfem_l vasint_l vaslat_l vasmed_l)
    ObjectGroup ankle_df_l: members=(edl_l ehl_l pertert_l tibant_l)
    ObjectGroup ankle_pf_l: members=(fdl_l fhl_l gaslat_l gasmed_l perbrev_l perlong_l soleus_l tibpost_l)
    ObjectGroup everter_l: members=(edl_l perbrev_l perlong_l pertert_l)
    ObjectGroup inverter_l: members=(ehl_l fdl_l fhl_l tibant_l tibpost_l)
    ObjectGroup back_ext: members=(ercspn_l ercspn_r)
    ObjectGroup back_rlb: members=(ercspn_r extobl_r intobl_r)
    ObjectGroup back_introt: members=(ercspn_r extobl_l intobl_r)
    ObjectGroup back_llb: members=(ercspn_l extobl_l intobl_l)
    ObjectGroup back_extrot: members=(ercspn_l extobl_r intobl_l)
    ObjectGroup back_flex: members=(extobl_l extobl_r intobl_l intobl_r)
  MarkerSet:
    Marker R.Shoulder: torso_markerPlate (0.00571978 0.0827385 0.169045)
    Marker L.Shoulder: torso_markerPlate (-0.00688169 0.0679805 -0.168314)
    Marker Neck: torso_markerPlate (-0.0350309 0.129574 -0.0174482)
    Marker Lumbar: torso_markerPlate (-0.0669044 -0.306973 0.0202403)
    Marker Chest: torso_markerPlate (0.103097 0.0266805 -0.00352408)
    Marker R.Elbow: humerus_r_markerPlate (0.0893025 -0.220532 0.131229)
    Marker R.Wrist: radius_r_markerPlate (0.0707289 -0.147498 0.0767692)
    Marker L.Elbow: humerus_l_markerPlate (0.126942 -0.210784 0.0838427)
    Marker L.Wrist: radius_l_markerPlate (0.0610693 -0.162396 0.101327)
    Marker R.ASIS: pelvis_markerPlate (0.0836801 -0.0319033 0.130676)
    Marker L.ASIS: pelvis_markerPlate (0.0671007 0.00820419 -0.144818)
    Marker Sacral: pelvis_markerPlate (-0.150781 0.0236991 0.0141411)
    Marker R.Thigh.Superior: femur_r_markerPlate (0.0680603 0.155054 -0.00468553)
    Marker R.Thigh.Inferior: femur_r_markerPlate (0.029925 -0.0060132 -0.0247717)
    Marker R.Thigh.Lateral: femur_r_markerPlate (-0.0215979 0.0556298 0.0645297)
    Marker R.Knee.Lateral: femur_r_markerPlate (-0.0223018 -0.0953682 0.0360502)
    Marker R.Knee.Medial: femur_r_markerPlate (-0.0540858 -0.109302 -0.0711225)
    Marker R.Shank.Superior: tibia_r_markerPlate (0.026637 0.189113 -0.0171546)
    Marker R.Shank.Inferior: tibia_r_markerPlate (0.0215914 -0.0117274 -0.0109974)
    Marker R.Shank.Lateral: tibia_r_markerPlate (-0.0208083 0.0801456 0.0581536)
    Marker R.Ankle.Lateral: tibia_r_markerPlate (-0.017275 -0.14183 0.0307282)
    Marker R.Ankle.Medial: tibia_r_markerPlate (-0.0101451 -0.115701 -0.0607297)
    Marker R.Heel: calcn_r_markerPlate (-0.0914828 -0.0109346 -0.0176538)
    Marker R.Midfoot.Superior: calcn_r_markerPlate (0.0857141 0.0360816 -0.0181442)
    Marker R.Midfoot.Lateral: calcn_r_markerPlate (0.0057687 -0.0251469 0.035798)
    Marker R.Toe.Lateral: toes_r_markerPlate (-0.0445016 -0.00568247 0.0607635)
    Marker R.Toe: toes_r_markerPlate (0.0698755 0.00675884 -0.00133453)
    Marker R.Toe.Medial: toes_r_markerPlate (-0.0253739 -0.00107636 -0.0594289)
    Marker L.Thigh.Superior: femur_l_markerPlate (0.0678499 0.15534 0.0100325)
    Marker L.Thigh.Inferior: femur_l_markerPlate (0.0236902 -0.034552 0.0129227)
    Marker L.Thigh.Lateral: femur_l_markerPlate (-0.0381503 0.05587 -0.0553127)
    Marker L.Knee.Lateral: femur_l_markerPlate (-0.0273898 -0.084509 -0.0351911)
    Marker L.Knee.Medial: femur_l_markerPlate (-0.026 -0.092149 0.0675485)
    Marker L.Shank.Superior: tibia_l_markerPlate (0.0288646 0.20696 0.00224596)
    Marker L.Shank.Lateral: tibia_l_markerPlate (-0.0386582 0.0821996 -0.0575897)
    Marker L.Shank.Inferior: tibia_l_markerPlate (0.025727 -0.0225324 0.0136412)
    Marker L.Ankle.Lateral: tibia_l_markerPlate (-0.0156027 -0.145041 -0.022821)
    Marker L.Ankle.Medial: tibia_l_markerPlate (-0.000330524 -0.121585 0.0645237)
    Marker L.Heel: calcn_l_markerPlate (-0.0860309 -0.00984587 0.0285572)
    Marker L.Midfoot.Superior: calcn_l_markerPlate (0.0822099 0.0358804 0.00350166)
    Marker L.Midfoot.Lateral: calcn_l_markerPlate (0.00382093 -0.0260346 -0.0320588)
    Marker L.Toe.Lateral: toes_l_markerPlate (-0.041626 -0.00715858 -0.0580174)
    Marker L.Toe: toes_l_markerPlate (0.0685439 0.00603754 -0.00048368)
    Marker L.Toe.Medial: toes_l_markerPlate (-0.026918 0.00112105 0.0585011)
