# OpenSim document version 30000
AnalyzeTool Patient4_optModel:
  replace_force_set: false
  results_directory: .
  output_precision: 8
  initial_time: 0
  final_time: 1.740682
  solve_for_equilibrium_for_auxiliary_states: false
  maximum_number_of_integrator_steps: 20000
  maximum_integrator_step_size: 1
  minimum_integrator_step_size: 1e-8
  integrator_error_tolerance: 1e-5
  coordinates_file: Patient4_TMGait_0pt2_01_right_01_ik.mot
  lowpass_cutoff_frequency_for_coordinates: 6
  AnalysisSet Analyses:
    MuscleAnalysis: start_time=0 end_time=1.740682 step_interval=1 in_degrees=true
        muscle_list=(addbrev_r addlong_r addmagDist_r addmagIsch_r addmagMid_r addmagProx_r glmax1_r glmax2_r glmax3_r glmed1_r glmed2_r glmed3_r glmin1_r glmin2_r glmin3_r iliacus_r psoas_r semimem_r semiten_r bflh_r bfsh_r recfem_r vasmed_r vaslat_r vasint_r gaslat_r gasmed_r tibant_r tibpost_r perbrev_r perlong_r pertert_r soleus_r edl_r fdl_r addbrev_l addlong_l addmagDist_l addmagIsch_l addmagMid_l addmagProx_l glmax1_l glmax2_l glmax3_l glmed1_l glmed2_l glmed3_l glmin1_l glmin2_l glmin3_l iliacus_l psoas_l semimem_l semiten_l bflh_l bfsh_l recfem_l vasmed_l vaslat_l vasint_l gaslat_l gasmed_l tibant_l tibpost_l perbrev_l perlong_l pertert_l soleus_l edl_l fdl_l)
        moment_arm_coordinate_list=(hip_flexion_r hip_adduction_r knee_angle_r ankle_angle_r subtalar_angle_r hip_flexion_l hip_adduction_l knee_angle_l ankle_angle_l subtalar_angle_l)
        compute_moments=true
    StatesReporter: start_time=0 end_time=1.740682 step_interval=1 in_degrees=true
